// SBML level 3 version 2

model small_test()

  // Compartments:
  compartment default_compartment = 1;

  // Species:
  species $Glucose in default_compartment = 10;
  species G6P in default_compartment = 0;
  species F6P in default_compartment = 0;
  species F16BP in default_compartment = 0;
  species ATP in default_compartment = 5/default_compartment;
  species ADP in default_compartment = 1/default_compartment;
  species G3P in default_compartment = 0;

  // Parameters:
  V1f = 1;
  K1g = 0.1;
  K1a = 0.1;
  V2f = 0.5;
  K2s = 0.1;
  V2r = 0.3;
  K2p = 0.1;
  V3f = 1;
  K3f = 0.1;
  K3a = 0.1;
  Ki_ATP = 2;
  V4f = 0.8;
  K4s = 0.1;
  k_drain = 0.2;
  k_regen = 0.2;

  // Reactions:
  J1: $Glucose + ATP -> G6P + ADP; V1f*Glucose*ATP/(K1g*K1a)/(1 + Glucose/K1g + ATP/K1a);
  J2: G6P -> F6P; (V2f*G6P/K2s - V2r*F6P/K2p)/(1 + G6P/K2s + F6P/K2p);
  J3: F6P + ATP -> F16BP + ADP; V3f*F6P*ATP/(K3f*K3a)/((1 + F6P/K3f + ATP/K3a)*(1 + ATP/Ki_ATP));
  J4: F16BP -> 2 G3P; V4f*F16BP/(K4s + F16BP);
  J5: G3P -> ; k_drain*G3P;
  J6: ADP -> ATP; k_regen*ADP;
end
