// SBML level 3 version 1
// dcterms:bibliographicCitation: urn:miriam:doi:10.1038/35018085

function translation(k, mRNA)
  k*mRNA;
end

function transcription_inducer_repressor_pair(V, M1, M2, h2, k2, h1, k1)
  V*(M1*(1 - M2^h2/(k2^h2 + M2^h2))^h1/(k1^h1 + M1*(1 - M2^h2/(k2^h2 + M2^h2))^h1));
end
transcription_inducer_repressor_pair is "transcription inducer-repressor pair";

function transcription_inducer_repressor_pair___inducer(V, alpha1, M1, M2, h2, k2, h1, k1, alpha3, M3, h3, k3)
  V*((alpha1*(M1*(1 - M2^h2/(k2^h2 + M2^h2))^h1/(k1^h1 + M1*(1 - M2^h2/(k2^h2 + M2^h2))^h1)) + alpha3*M3^h3/(k3^h3 + M3^h3))/(1 + alpha1*(M1*(1 - M2^h2/(k2^h2 + M2^h2))^h1/(k1^h1 + M1*(1 - M2^h2/(k2^h2 + M2^h2))^h1)) + alpha3*M3^h3/(k3^h3 + M3^h3)));
end
transcription_inducer_repressor_pair___inducer is "transcription inducer-repressor pair + inducer";

function first_order_w__activator(V, S, M, h, k)
  V*S*M^h/(k^h + M^h);
end
first_order_w__activator is "first order w/ activator";

function Uni_molecular_transport(Vol, k1, S)
  Vol*k1*S;
end
Uni_molecular_transport is "Uni-molecular transport";

function Pseudo_bi_molecular_reaction_with_transport(k1, Vol1, S1, Vol2, S2)
  k1*Vol1*S1*Vol2*S2;
end
Pseudo_bi_molecular_reaction_with_transport is "Pseudo bi-molecular reaction with transport";

model Segment_Polarity_Network_model_on_1x4_grid()
  // Segment polarity network model
  // This is an implementation of the model in von Dassow et al (2000), where a gene network controls segment polarity in a fly embryo. The paper describes an arrangement of several hexagonal cells with interactions between neighbors in a toroidal shape (i.e. the edges of the grid are connected to each other) but it did not explicitly mention the dimensions of the grid used in their simulation. Here we adopt a 1x4 grid.
  // The model contains species that reside in the cell membrane (EWG, PTC, HH, and PH). Since the cells are hexagonal, the model partitions these species into 6 different pools, one per side of the hexagon. The model allows for these species to diffuse around the membrane, implemented by transfer reactions between a pool and the two neighboring pools. The sides of the hexagonal cells are labelled 1-6, with 1 at the base, and numbered clockwise.
  // Some reactions include components from neighboring cells:
  // Induction of en by EWG (reaction R01) is from all 6 neighboring cells.
  // The complex PH is composed by PTC in this cell and HH from the neighboring cell (reactions R30a_i and R30b_i).
  // EWG is exchanged with the neighboring cells (reactions R26_ij where i and j are the indices of two adjacent sides).
  // Species and reactions are labelled by their cell index and membrane index. Thus, species CI_1,4 is the CI protein located in cell[1,4]; species EWG3_0,5 is the protein EWG located in the side 3 of cell[0,5]; reaction R2_0,3 is reaction number 2 in cell[0,3]; reaction R30_4_0,2 is reaction 30 on side 4 of the membrane of cell[0,2].
  // Reference
  // von Dassow G, Meir E, Munro EM, Odell GM (2000) The segment polarity network is a robust developmental module Nature 406:188–192
  // This COPASI file was created by Pedro Mendes with a python script, vonDassow2000.py, using BasiCO, a simplified python interface to COPASI.
  // version: 4.1x4
  // CC0 1.0 Universal: To the extent possible under law, all copyright and related or neighbouring rights to this encoded model have been dedicated to the public domain worldwide. You can copy, modify, distribute and perform the work, even for commercial purposes, all without asking permission. Please refer to CC0 Public Domain Dedication for more information.
  // GO:0007367
  // hasTaxon taxonomy:1830
  // isDescribedBy doi:10.1038/35018085
  // model units - substance: substance, time: time, volume: volume, area: area, length: length, extent: substance

  // Compartments:
  compartment cell_0_0 = 1 volume; cell_0_0 is "cell[0,0]";
  compartment cell_0_1 = 1 volume; cell_0_1 is "cell[0,1]";
  compartment cell_0_2 = 1 volume; cell_0_2 is "cell[0,2]";
  compartment cell_0_3 = 1 volume; cell_0_3 is "cell[0,3]";

  // Species:
  species en_0_0 in cell_0_0 = 0.25; en_0_0 is "en_0,0";  // isEncodedBy fb:FBgn0000577
  species EN_0_0 in cell_0_0 = 0.25; EN_0_0 is "EN_0,0";  // isVersionOf uniprot:P02836; occursIn GO:0005634
  species ci_0_0 in cell_0_0 = 0.05; ci_0_0 is "ci_0,0";  // isEncodedBy fb:FBgn0004859
  species CI_0_0 in cell_0_0 = 1e-20; CI_0_0 is "CI_0,0";  // isVersionOf uniprot:P19538; occursIn GO:0005634
  species CN_0_0 in cell_0_0 = 1e-20; CN_0_0 is "CN_0,0";  // isVersionOf uniprot:P19538; occursIn GO:0005634
  species hh_0_0 in cell_0_0 = 1e-20; hh_0_0 is "hh_0,0";  // isEncodedBy fb:FBgn0004644
  species HH1_0_0 in cell_0_0 = 1e-20; HH1_0_0 is "HH1_0,0";  // isVersionOf uniprot:Q02936; occursIn GO:0005886
  species HH2_0_0 in cell_0_0 = 1e-20; HH2_0_0 is "HH2_0,0";  // isVersionOf uniprot:Q02936; occursIn GO:0005886
  species HH3_0_0 in cell_0_0 = 1e-20; HH3_0_0 is "HH3_0,0";  // isVersionOf uniprot:Q02936; occursIn GO:0005886
  species HH4_0_0 in cell_0_0 = 1e-20; HH4_0_0 is "HH4_0,0";  // isVersionOf uniprot:Q02936; occursIn GO:0005886
  species HH5_0_0 in cell_0_0 = 1e-20; HH5_0_0 is "HH5_0,0";  // isVersionOf uniprot:Q02936; occursIn GO:0005886
  species HH6_0_0 in cell_0_0 = 1e-20; HH6_0_0 is "HH6_0,0";  // isVersionOf uniprot:Q02936; occursIn GO:0005886
  species ptc_0_0 in cell_0_0 = 1e-20; ptc_0_0 is "ptc_0,0";  // isEncodedBy fb:FBgn0003892
  species PTC1_0_0 in cell_0_0 = 1e-20; PTC1_0_0 is "PTC1_0,0";  // isVersionOf uniprot:P18502; occursIn GO:0005886
  species PTC2_0_0 in cell_0_0 = 1e-20; PTC2_0_0 is "PTC2_0,0";  // isVersionOf uniprot:P18502; occursIn GO:0005886
  species PTC3_0_0 in cell_0_0 = 1e-20; PTC3_0_0 is "PTC3_0,0";  // isVersionOf uniprot:P18502; occursIn GO:0005886
  species PTC4_0_0 in cell_0_0 = 1e-20; PTC4_0_0 is "PTC4_0,0";  // isVersionOf uniprot:P18502; occursIn GO:0005886
  species PTC5_0_0 in cell_0_0 = 1e-20; PTC5_0_0 is "PTC5_0,0";  // isVersionOf uniprot:P18502; occursIn GO:0005886
  species PTC6_0_0 in cell_0_0 = 1e-20; PTC6_0_0 is "PTC6_0,0";  // isVersionOf uniprot:P18502; occursIn GO:0005886
  species wg_0_0 in cell_0_0 = 0.2; wg_0_0 is "wg_0,0";  // isEncodedBy fb:FBgn0284084
  species IWG_0_0 in cell_0_0 = 0.2; IWG_0_0 is "IWG_0,0";  // isVersionOf uniprot:P09615; occursIn GO:0005737
  species EWG1_0_0 in cell_0_0 = 0.2; EWG1_0_0 is "EWG1_0,0";  // isVersionOf uniprot:P09615; occursIn GO:0005886
  species EWG2_0_0 in cell_0_0 = 0.2; EWG2_0_0 is "EWG2_0,0";  // isVersionOf uniprot:P09615; occursIn GO:0005886
  species EWG3_0_0 in cell_0_0 = 0.2; EWG3_0_0 is "EWG3_0,0";  // isVersionOf uniprot:P09615; occursIn GO:0005886
  species EWG4_0_0 in cell_0_0 = 0.2; EWG4_0_0 is "EWG4_0,0";  // isVersionOf uniprot:P09615; occursIn GO:0005886
  species EWG5_0_0 in cell_0_0 = 0.2; EWG5_0_0 is "EWG5_0,0";  // isVersionOf uniprot:P09615; occursIn GO:0005886
  species EWG6_0_0 in cell_0_0 = 0.2; EWG6_0_0 is "EWG6_0,0";  // isVersionOf uniprot:P09615; occursIn GO:0005886
  species PH1_0_0 in cell_0_0 = 1e-20; PH1_0_0 is "PH1_0,0";  // hasPart uniprot:P18502; hasPart uniprot:Q02936; occursIn GO:0005886
  species PH2_0_0 in cell_0_0 = 1e-20; PH2_0_0 is "PH2_0,0";  // hasPart uniprot:Q02936; hasPart uniprot:P18502; occursIn GO:0005886
  species PH3_0_0 in cell_0_0 = 1e-20; PH3_0_0 is "PH3_0,0";  // hasPart uniprot:P18502; hasPart uniprot:Q02936; occursIn GO:0005886
  species PH4_0_0 in cell_0_0 = 1e-20; PH4_0_0 is "PH4_0,0";  // hasPart uniprot:Q02936; hasPart uniprot:P18502; occursIn GO:0005886
  species PH5_0_0 in cell_0_0 = 1e-20; PH5_0_0 is "PH5_0,0";  // hasPart uniprot:Q02936; hasPart uniprot:P18502; occursIn GO:0005886
  species PH6_0_0 in cell_0_0 = 1e-20; PH6_0_0 is "PH6_0,0";  // hasPart uniprot:P18502; hasPart uniprot:Q02936; occursIn GO:0005886
  species $B_0_0 in cell_0_0 = 0.4; B_0_0 is "B_0,0";
  species $PTC_T_0_0 in cell_0_0; PTC_T_0_0 is "PTC_T_0,0";  // isVersionOf uniprot:P18502; occursIn GO:0005886
  species $EWG_T_0_0 in cell_0_0; EWG_T_0_0 is "EWG_T_0,0";  // isVersionOf uniprot:P09615; occursIn GO:0005886
  species $PH_T_0_0 in cell_0_0; PH_T_0_0 is "PH_T_0,0";  // hasPart uniprot:P18502; hasPart uniprot:Q02936; occursIn GO:0005886
  species en_0_1 in cell_0_1 = 0.35; en_0_1 is "en_0,1";  // isEncodedBy fb:FBgn0000577
  species EN_0_1 in cell_0_1 = 0.35; EN_0_1 is "EN_0,1";  // isVersionOf uniprot:P02836; occursIn GO:0005634
  species ci_0_1 in cell_0_1 = 0.05; ci_0_1 is "ci_0,1";  // isEncodedBy fb:FBgn0004859
  species CI_0_1 in cell_0_1 = 1e-20; CI_0_1 is "CI_0,1";  // isVersionOf uniprot:P19538; occursIn GO:0005634
  species CN_0_1 in cell_0_1 = 1e-20; CN_0_1 is "CN_0,1";  // isVersionOf uniprot:P19538; occursIn GO:0005634
  species hh_0_1 in cell_0_1 = 1e-20; hh_0_1 is "hh_0,1";  // isEncodedBy fb:FBgn0004644
  species HH1_0_1 in cell_0_1 = 1e-20; HH1_0_1 is "HH1_0,1";  // isVersionOf uniprot:Q02936; occursIn GO:0005886
  species HH2_0_1 in cell_0_1 = 1e-20; HH2_0_1 is "HH2_0,1";  // isVersionOf uniprot:Q02936; occursIn GO:0005886
  species HH3_0_1 in cell_0_1 = 1e-20; HH3_0_1 is "HH3_0,1";  // isVersionOf uniprot:Q02936; occursIn GO:0005886
  species HH4_0_1 in cell_0_1 = 1e-20; HH4_0_1 is "HH4_0,1";  // isVersionOf uniprot:Q02936; occursIn GO:0005886
  species HH5_0_1 in cell_0_1 = 1e-20; HH5_0_1 is "HH5_0,1";  // isVersionOf uniprot:Q02936; occursIn GO:0005886
  species HH6_0_1 in cell_0_1 = 1e-20; HH6_0_1 is "HH6_0,1";  // isVersionOf uniprot:Q02936; occursIn GO:0005886
  species ptc_0_1 in cell_0_1 = 1e-20; ptc_0_1 is "ptc_0,1";  // isEncodedBy fb:FBgn0003892
  species PTC1_0_1 in cell_0_1 = 1e-20; PTC1_0_1 is "PTC1_0,1";  // isVersionOf uniprot:P18502; occursIn GO:0005886
  species PTC2_0_1 in cell_0_1 = 1e-20; PTC2_0_1 is "PTC2_0,1";  // isVersionOf uniprot:P18502; occursIn GO:0005886
  species PTC3_0_1 in cell_0_1 = 1e-20; PTC3_0_1 is "PTC3_0,1";  // isVersionOf uniprot:P18502; occursIn GO:0005886
  species PTC4_0_1 in cell_0_1 = 1e-20; PTC4_0_1 is "PTC4_0,1";  // isVersionOf uniprot:P18502; occursIn GO:0005886
  species PTC5_0_1 in cell_0_1 = 1e-20; PTC5_0_1 is "PTC5_0,1";  // isVersionOf uniprot:P18502; occursIn GO:0005886
  species PTC6_0_1 in cell_0_1 = 1e-20; PTC6_0_1 is "PTC6_0,1";  // isVersionOf uniprot:P18502; occursIn GO:0005886
  species wg_0_1 in cell_0_1 = 0.3; wg_0_1 is "wg_0,1";  // isEncodedBy fb:FBgn0284084
  species IWG_0_1 in cell_0_1 = 0.3; IWG_0_1 is "IWG_0,1";  // isVersionOf uniprot:P09615; occursIn GO:0005737
  species EWG1_0_1 in cell_0_1 = 0.3; EWG1_0_1 is "EWG1_0,1";  // isVersionOf uniprot:P09615; occursIn GO:0005886
  species EWG2_0_1 in cell_0_1 = 0.3; EWG2_0_1 is "EWG2_0,1";  // isVersionOf uniprot:P09615; occursIn GO:0005886
  species EWG3_0_1 in cell_0_1 = 0.3; EWG3_0_1 is "EWG3_0,1";  // isVersionOf uniprot:P09615; occursIn GO:0005886
  species EWG4_0_1 in cell_0_1 = 0.3; EWG4_0_1 is "EWG4_0,1";  // isVersionOf uniprot:P09615; occursIn GO:0005886
  species EWG5_0_1 in cell_0_1 = 0.3; EWG5_0_1 is "EWG5_0,1";  // isVersionOf uniprot:P09615; occursIn GO:0005886
  species EWG6_0_1 in cell_0_1 = 0.3; EWG6_0_1 is "EWG6_0,1";  // isVersionOf uniprot:P09615; occursIn GO:0005886
  species PH1_0_1 in cell_0_1 = 1e-20; PH1_0_1 is "PH1_0,1";  // hasPart uniprot:P18502; hasPart uniprot:Q02936; occursIn GO:0005886
  species PH2_0_1 in cell_0_1 = 1e-20; PH2_0_1 is "PH2_0,1";  // hasPart uniprot:Q02936; hasPart uniprot:P18502; occursIn GO:0005886
  species PH3_0_1 in cell_0_1 = 1e-20; PH3_0_1 is "PH3_0,1";  // hasPart uniprot:P18502; hasPart uniprot:Q02936; occursIn GO:0005886
  species PH4_0_1 in cell_0_1 = 1e-20; PH4_0_1 is "PH4_0,1";  // hasPart uniprot:Q02936; hasPart uniprot:P18502; occursIn GO:0005886
  species PH5_0_1 in cell_0_1 = 1e-20; PH5_0_1 is "PH5_0,1";  // hasPart uniprot:Q02936; hasPart uniprot:P18502; occursIn GO:0005886
  species PH6_0_1 in cell_0_1 = 1e-20; PH6_0_1 is "PH6_0,1";  // hasPart uniprot:P18502; hasPart uniprot:Q02936; occursIn GO:0005886
  species $B_0_1 in cell_0_1 = 0.4; B_0_1 is "B_0,1";
  species $PTC_T_0_1 in cell_0_1; PTC_T_0_1 is "PTC_T_0,1";  // isVersionOf uniprot:P18502; occursIn GO:0005886
  species $EWG_T_0_1 in cell_0_0; EWG_T_0_1 is "EWG_T_0,1";  // isVersionOf uniprot:P09615; occursIn GO:0005886
  species $PH_T_0_1 in cell_0_1; PH_T_0_1 is "PH_T_0,1";  // hasPart uniprot:P18502; hasPart uniprot:Q02936; occursIn GO:0005886
  species en_0_2 in cell_0_2 = 0.55; en_0_2 is "en_0,2";  // isEncodedBy fb:FBgn0000577
  species EN_0_2 in cell_0_2 = 0.55; EN_0_2 is "EN_0,2";  // isVersionOf uniprot:P02836; occursIn GO:0005634
  species ci_0_2 in cell_0_2 = 0.05; ci_0_2 is "ci_0,2";  // isEncodedBy fb:FBgn0004859
  species CI_0_2 in cell_0_2 = 1e-20; CI_0_2 is "CI_0,2";  // isVersionOf uniprot:P19538; occursIn GO:0005634
  species CN_0_2 in cell_0_2 = 1e-20; CN_0_2 is "CN_0,2";  // isVersionOf uniprot:P19538; occursIn GO:0005634
  species hh_0_2 in cell_0_2 = 1e-20; hh_0_2 is "hh_0,2";  // isEncodedBy fb:FBgn0004644
  species HH1_0_2 in cell_0_2 = 1e-20; HH1_0_2 is "HH1_0,2";  // isVersionOf uniprot:Q02936; occursIn GO:0005886
  species HH2_0_2 in cell_0_2 = 1e-20; HH2_0_2 is "HH2_0,2";  // isVersionOf uniprot:Q02936; occursIn GO:0005886
  species HH3_0_2 in cell_0_2 = 1e-20; HH3_0_2 is "HH3_0,2";  // isVersionOf uniprot:Q02936; occursIn GO:0005886
  species HH4_0_2 in cell_0_2 = 1e-20; HH4_0_2 is "HH4_0,2";  // isVersionOf uniprot:Q02936; occursIn GO:0005886
  species HH5_0_2 in cell_0_2 = 1e-20; HH5_0_2 is "HH5_0,2";  // isVersionOf uniprot:Q02936; occursIn GO:0005886
  species HH6_0_2 in cell_0_2 = 1e-20; HH6_0_2 is "HH6_0,2";  // isVersionOf uniprot:Q02936; occursIn GO:0005886
  species ptc_0_2 in cell_0_2 = 1e-20; ptc_0_2 is "ptc_0,2";  // isEncodedBy fb:FBgn0003892
  species PTC1_0_2 in cell_0_2 = 1e-20; PTC1_0_2 is "PTC1_0,2";  // isVersionOf uniprot:P18502; occursIn GO:0005886
  species PTC2_0_2 in cell_0_2 = 1e-20; PTC2_0_2 is "PTC2_0,2";  // isVersionOf uniprot:P18502; occursIn GO:0005886
  species PTC3_0_2 in cell_0_2 = 1e-20; PTC3_0_2 is "PTC3_0,2";  // isVersionOf uniprot:P18502; occursIn GO:0005886
  species PTC4_0_2 in cell_0_2 = 1e-20; PTC4_0_2 is "PTC4_0,2";  // isVersionOf uniprot:P18502; occursIn GO:0005886
  species PTC5_0_2 in cell_0_2 = 1e-20; PTC5_0_2 is "PTC5_0,2";  // isVersionOf uniprot:P18502; occursIn GO:0005886
  species PTC6_0_2 in cell_0_2 = 1e-20; PTC6_0_2 is "PTC6_0,2";  // isVersionOf uniprot:P18502; occursIn GO:0005886
  species wg_0_2 in cell_0_2 = 0.2; wg_0_2 is "wg_0,2";  // isEncodedBy fb:FBgn0284084
  species IWG_0_2 in cell_0_2 = 0.2; IWG_0_2 is "IWG_0,2";  // isVersionOf uniprot:P09615; occursIn GO:0005737
  species EWG1_0_2 in cell_0_2 = 0.2; EWG1_0_2 is "EWG1_0,2";  // isVersionOf uniprot:P09615; occursIn GO:0005886
  species EWG2_0_2 in cell_0_2 = 0.2; EWG2_0_2 is "EWG2_0,2";  // isVersionOf uniprot:P09615; occursIn GO:0005886
  species EWG3_0_2 in cell_0_2 = 0.2; EWG3_0_2 is "EWG3_0,2";  // isVersionOf uniprot:P09615; occursIn GO:0005886
  species EWG4_0_2 in cell_0_2 = 0.2; EWG4_0_2 is "EWG4_0,2";  // isVersionOf uniprot:P09615; occursIn GO:0005886
  species EWG5_0_2 in cell_0_2 = 0.2; EWG5_0_2 is "EWG5_0,2";  // isVersionOf uniprot:P09615; occursIn GO:0005886
  species EWG6_0_2 in cell_0_2 = 0.2; EWG6_0_2 is "EWG6_0,2";  // isVersionOf uniprot:P09615; occursIn GO:0005886
  species PH1_0_2 in cell_0_2 = 1e-20; PH1_0_2 is "PH1_0,2";  // hasPart uniprot:P18502; hasPart uniprot:Q02936; occursIn GO:0005886
  species PH2_0_2 in cell_0_2 = 1e-20; PH2_0_2 is "PH2_0,2";  // hasPart uniprot:P18502; hasPart uniprot:Q02936; occursIn GO:0005886
  species PH3_0_2 in cell_0_2 = 1e-20; PH3_0_2 is "PH3_0,2";  // hasPart uniprot:Q02936; hasPart uniprot:P18502; occursIn GO:0005886
  species PH4_0_2 in cell_0_2 = 1e-20; PH4_0_2 is "PH4_0,2";  // hasPart uniprot:Q02936; hasPart uniprot:P18502; occursIn GO:0005886
  species PH5_0_2 in cell_0_2 = 1e-20; PH5_0_2 is "PH5_0,2";  // hasPart uniprot:Q02936; hasPart uniprot:P18502; occursIn GO:0005886
  species PH6_0_2 in cell_0_2 = 1e-20; PH6_0_2 is "PH6_0,2";  // hasPart uniprot:Q02936; hasPart uniprot:P18502; occursIn GO:0005886
  species $B_0_2 in cell_0_2 = 0.4; B_0_2 is "B_0,2";
  species $PTC_T_0_2 in cell_0_2; PTC_T_0_2 is "PTC_T_0,2";  // isVersionOf uniprot:P18502; occursIn GO:0005886
  species $EWG_T_0_2 in cell_0_0; EWG_T_0_2 is "EWG_T_0,2";  // isVersionOf uniprot:P09615; occursIn GO:0005886
  species $PH_T_0_2 in cell_0_2; PH_T_0_2 is "PH_T_0,2";  // hasPart uniprot:Q02936; hasPart uniprot:P18502; occursIn GO:0005886
  species en_0_3 in cell_0_3 = 0.35; en_0_3 is "en_0,3";  // isEncodedBy fb:FBgn0000577
  species EN_0_3 in cell_0_3 = 0.35; EN_0_3 is "EN_0,3";  // isVersionOf uniprot:P02836; occursIn GO:0005634
  species ci_0_3 in cell_0_3 = 0.05; ci_0_3 is "ci_0,3";  // isEncodedBy fb:FBgn0004859
  species CI_0_3 in cell_0_3 = 1e-20; CI_0_3 is "CI_0,3";  // isVersionOf uniprot:P19538; occursIn GO:0005634
  species CN_0_3 in cell_0_3 = 1e-20; CN_0_3 is "CN_0,3";  // isVersionOf uniprot:P19538; occursIn GO:0005634
  species hh_0_3 in cell_0_3 = 1e-20; hh_0_3 is "hh_0,3";  // isEncodedBy fb:FBgn0004644
  species HH1_0_3 in cell_0_3 = 1e-20; HH1_0_3 is "HH1_0,3";  // isVersionOf uniprot:Q02936; occursIn GO:0005886
  species HH2_0_3 in cell_0_3 = 1e-20; HH2_0_3 is "HH2_0,3";  // isVersionOf uniprot:Q02936; occursIn GO:0005886
  species HH3_0_3 in cell_0_3 = 1e-20; HH3_0_3 is "HH3_0,3";  // isVersionOf uniprot:Q02936; occursIn GO:0005886
  species HH4_0_3 in cell_0_3 = 1e-20; HH4_0_3 is "HH4_0,3";  // isVersionOf uniprot:Q02936; occursIn GO:0005886
  species HH5_0_3 in cell_0_3 = 1e-20; HH5_0_3 is "HH5_0,3";  // isVersionOf uniprot:Q02936; occursIn GO:0005886
  species HH6_0_3 in cell_0_3 = 1e-20; HH6_0_3 is "HH6_0,3";  // isVersionOf uniprot:Q02936; occursIn GO:0005886
  species ptc_0_3 in cell_0_3 = 1e-20; ptc_0_3 is "ptc_0,3";  // isEncodedBy fb:FBgn0003892
  species PTC1_0_3 in cell_0_3 = 1e-20; PTC1_0_3 is "PTC1_0,3";  // isVersionOf uniprot:P18502; occursIn GO:0005886
  species PTC2_0_3 in cell_0_3 = 1e-20; PTC2_0_3 is "PTC2_0,3";  // isVersionOf uniprot:P18502; occursIn GO:0005886
  species PTC3_0_3 in cell_0_3 = 1e-20; PTC3_0_3 is "PTC3_0,3";  // isVersionOf uniprot:P18502; occursIn GO:0005886
  species PTC4_0_3 in cell_0_3 = 1e-20; PTC4_0_3 is "PTC4_0,3";  // isVersionOf uniprot:P18502; occursIn GO:0005886
  species PTC5_0_3 in cell_0_3 = 1e-20; PTC5_0_3 is "PTC5_0,3";  // isVersionOf uniprot:P18502; occursIn GO:0005886
  species PTC6_0_3 in cell_0_3 = 1e-20; PTC6_0_3 is "PTC6_0,3";  // isVersionOf uniprot:P18502; occursIn GO:0005886
  species wg_0_3 in cell_0_3 = 0.1; wg_0_3 is "wg_0,3";  // isEncodedBy fb:FBgn0284084
  species IWG_0_3 in cell_0_3 = 0.1; IWG_0_3 is "IWG_0,3";  // isVersionOf uniprot:P09615; occursIn GO:0005737
  species EWG1_0_3 in cell_0_3 = 0.1; EWG1_0_3 is "EWG1_0,3";  // isVersionOf uniprot:P09615; occursIn GO:0005886
  species EWG2_0_3 in cell_0_3 = 0.1; EWG2_0_3 is "EWG2_0,3";  // isVersionOf uniprot:P09615; occursIn GO:0005886
  species EWG3_0_3 in cell_0_3 = 0.1; EWG3_0_3 is "EWG3_0,3";  // isVersionOf uniprot:P09615; occursIn GO:0005886
  species EWG4_0_3 in cell_0_3 = 0.1; EWG4_0_3 is "EWG4_0,3";  // isVersionOf uniprot:P09615; occursIn GO:0005886
  species EWG5_0_3 in cell_0_3 = 0.1; EWG5_0_3 is "EWG5_0,3";  // isVersionOf uniprot:P09615; occursIn GO:0005886
  species EWG6_0_3 in cell_0_3 = 0.1; EWG6_0_3 is "EWG6_0,3";  // isVersionOf uniprot:P09615; occursIn GO:0005886
  species PH1_0_3 in cell_0_3 = 1e-20; PH1_0_3 is "PH1_0,3";  // hasPart uniprot:Q02936; hasPart uniprot:P18502; occursIn GO:0005886
  species PH2_0_3 in cell_0_3 = 1e-20; PH2_0_3 is "PH2_0,3";  // hasPart uniprot:Q02936; hasPart uniprot:P18502; occursIn GO:0005886
  species PH3_0_3 in cell_0_3 = 1e-20; PH3_0_3 is "PH3_0,3";  // hasPart uniprot:Q02936; hasPart uniprot:P18502; occursIn GO:0005886
  species PH4_0_3 in cell_0_3 = 1e-20; PH4_0_3 is "PH4_0,3";  // hasPart uniprot:Q02936; hasPart uniprot:P18502; occursIn GO:0005886
  species PH5_0_3 in cell_0_3 = 1e-20; PH5_0_3 is "PH5_0,3";  // hasPart uniprot:Q02936; hasPart uniprot:P18502; occursIn GO:0005886
  species PH6_0_3 in cell_0_3 = 1e-20; PH6_0_3 is "PH6_0,3";  // hasPart uniprot:P18502; hasPart uniprot:Q02936; occursIn GO:0005886
  species $B_0_3 in cell_0_3 = 0.4; B_0_3 is "B_0,3";
  species $PTC_T_0_3 in cell_0_3; PTC_T_0_3 is "PTC_T_0,3";  // isVersionOf uniprot:P18502; occursIn GO:0005886
  species $EWG_T_0_3 in cell_0_0; EWG_T_0_3 is "EWG_T_0,3";  // isVersionOf uniprot:P09615; occursIn GO:0005886
  species $PH_T_0_3 in cell_0_3; PH_T_0_3 is "PH_T_0,3";  // hasPart uniprot:P18502; hasPart uniprot:Q02936; occursIn GO:0005886

  // Parameters:
  T0 = 1 unit_0;
  H_en = 9.63785 unit_0;
  H_EN = 6.63279 unit_0;
  H_wg = 49.1988 unit_0;
  H_IWG = 14.0371 unit_0;
  H_EWG = 47.2665 unit_0;
  H_ptc = 92.0732 unit_0;
  H_PTC = 48.8711 unit_0;
  H_ci = 7.57263 unit_0;
  H_CI = 28.4219 unit_0;
  H_hh = 57.9751 unit_0;
  H_HH = 21.9749 unit_0;
  H_PH = 64.9729 unit_0;
  C_CI = 0.246796 unit_0;
  kappa_WGen = 0.00240536 unit_0;
  nu_WGen = 2.4465 unit_0;
  kappa_CNen = 0.00121403 unit_0;
  nu_CNen = 5.08594 unit_0;
  kappa_CNwg = 0.0286831 unit_0;
  nu_CNwg = 5.40768 unit_0;
  kappa_CIwg = 0.904105 unit_0;
  nu_CIwg = 4.58513 unit_0;
  kappa_WGwg = 0.104436 unit_0;
  nu_WGwg = 4.81218 unit_0;
  alpha_CIwg = 8.15048 unit_0;
  alpha_WGwg = 5.8383 unit_0;
  kappa_CNptc = 0.255428 unit_0;
  nu_CNptc = 4.34855 unit_0;
  kappa_CIptc = 0.109108 unit_0;
  nu_CIptc = 1.01506 unit_0;
  kappa_Bci = 0.00490722 unit_0;
  nu_Bci = 9.63095 unit_0;
  kappa_ENci = 0.0454899 unit_0;
  nu_ENci = 2.61964 unit_0;
  kappa_ENhh = 0.162895 unit_0;
  nu_ENhh = 7.70321 unit_0;
  kappa_CNhh = 0.0105685 unit_0;
  nu_CNhh = 6.0273 unit_0;
  kappa_PTCCI = 0.00487319 unit_0;
  nu_PTCCI = 3.52315 unit_0;
  r_ExoWG = 0.358857 unit_0;
  r_EndoWG = 0.00252198 unit_0;
  r_MxferWG = 0.0264395 unit_0;
  r_LMxferWG = 0.403146 unit_0;
  r_LMxferPTC = 0.00351773 unit_0;
  r_LMxferHH = 0.0169928 unit_0;
  kappa_PTCHH = 0.00132915 unit_0;
  PTC_0 = 131.94 unit_0;
  HH_0 = 4.65494 unit_0;
  T0_H_EN has unit_0; T0_H_EN is "T0/H_EN";
  T0_H_ci has unit_0; T0_H_ci is "T0/H_ci";
  T0_H_IWG has unit_0; T0_H_IWG is "T0/H_IWG";
  T0_H_EWG has unit_0; T0_H_EWG is "T0/H_EWG";
  T0_H_hh has unit_0; T0_H_hh is "T0/H_hh";
  T0_H_PTC has unit_0; T0_H_PTC is "T0/H_PTC";
  T0_H_wg has unit_0; T0_H_wg is "T0/H_wg";
  T0_H_ptc has unit_0; T0_H_ptc is "T0/H_ptc";
  T0_H_CI has unit_0; T0_H_CI is "T0/H_CI";
  T0_H_PH has unit_0; T0_H_PH is "T0/H_PH";
  T0_H_en has unit_0; T0_H_en is "T0/H_en";
  T0_H_HH has unit_0; T0_H_HH is "T0/H_HH";
  T0_6H_HH has unit_0; T0_6H_HH is "T0/6H_HH";
  T0_6H_PTC has unit_0; T0_6H_PTC is "T0/6H_PTC";
  T0_r_ExoWG_6 has unit_0; T0_r_ExoWG_6 is "T0.r_ExoWG/6";
  T0_r_EndoWG has unit_0; T0_r_EndoWG is "T0.r_EndoWG";
  T0_C_CI has unit_0; T0_C_CI is "T0.C_CI";
  T0_r_MxferWG has unit_0; T0_r_MxferWG is "T0.r_MxferWG";
  T0_r_LMxferWG has unit_0; T0_r_LMxferWG is "T0.r_LMxferWG";
  T0_r_LMxferHH has unit_0; T0_r_LMxferHH is "T0.r_LMxferHH";
  T0_kappa_PTCHH_HH_0 has unit_0; T0_kappa_PTCHH_HH_0 is "T0.kappa_PTCHH.HH_0";
  T0_kappa_PTCHH_PTC_0 has unit_0; T0_kappa_PTCHH_PTC_0 is "T0.kappa_PTCHH.PTC_0";

  // Assignment rules:
  T0_6H_HH := T0/(6*H_HH);
  T0_6H_PTC := T0/(6*H_PTC);
  T0_r_ExoWG_6 := T0*r_ExoWG/6;
  T0_H_HH := T0/H_HH;
  T0_r_LMxferHH := T0*r_LMxferHH;
  T0_kappa_PTCHH_HH_0 := T0*kappa_PTCHH*HH_0;
  T0_kappa_PTCHH_PTC_0 := T0*kappa_PTCHH*PTC_0;
  PTC_T_0_0 := PTC1_0_0 + PTC2_0_0 + PTC3_0_0 + PTC4_0_0 + PTC5_0_0 + PTC6_0_0;
  EWG_T_0_0 := EWG4_0_0 + EWG5_0_3 + EWG6_0_3 + EWG1_0_0 + EWG2_0_1 + EWG3_0_1;
  PTC_T_0_2 := PTC1_0_2 + PTC2_0_2 + PTC3_0_2 + PTC4_0_2 + PTC5_0_2 + PTC6_0_2;
  EWG_T_0_2 := EWG4_0_2 + EWG5_0_1 + EWG6_0_1 + EWG1_0_2 + EWG2_0_3 + EWG3_0_3;
  PH_T_0_0 := PH1_0_0 + PH2_0_0 + PH3_0_0 + PH4_0_0 + PH5_0_0 + PH6_0_0;
  PTC_T_0_3 := PTC1_0_3 + PTC2_0_3 + PTC3_0_3 + PTC4_0_3 + PTC5_0_3 + PTC6_0_3;
  PH_T_0_3 := PH1_0_3 + PH2_0_3 + PH3_0_3 + PH4_0_3 + PH5_0_3 + PH6_0_3;
  T0_H_EN := T0/H_EN;
  T0_H_ci := T0/H_ci;
  T0_H_IWG := T0/H_IWG;
  T0_C_CI := T0*C_CI;
  T0_r_MxferWG := T0*r_MxferWG;
  T0_r_LMxferWG := T0*r_LMxferWG;
  T0_r_EndoWG := T0*r_EndoWG;
  T0_H_wg := T0/H_wg;
  T0_H_ptc := T0/H_ptc;
  T0_H_CI := T0/H_CI;
  T0_H_PH := T0/H_PH;
  T0_H_en := T0/H_en;
  PH_T_0_2 := PH1_0_2 + PH2_0_2 + PH3_0_2 + PH4_0_2 + PH5_0_2 + PH6_0_2;
  T0_H_EWG := T0/H_EWG;
  T0_H_hh := T0/H_hh;
  T0_H_PTC := T0/H_PTC;
  EWG_T_0_3 := EWG4_0_3 + EWG5_0_2 + EWG6_0_2 + EWG1_0_3 + EWG2_0_0 + EWG3_0_0;
  PTC_T_0_1 := PTC1_0_1 + PTC2_0_1 + PTC3_0_1 + PTC4_0_1 + PTC5_0_1 + PTC6_0_1;
  EWG_T_0_1 := EWG4_0_1 + EWG5_0_0 + EWG6_0_0 + EWG1_0_1 + EWG2_0_2 + EWG3_0_2;
  PH_T_0_1 := PH1_0_1 + PH2_0_1 + PH3_0_1 + PH4_0_1 + PH5_0_1 + PH6_0_1;

  // Reactions:
  R01_0_0: => en_0_0; cell_0_0*transcription_inducer_repressor_pair(T0_H_en, EWG_T_0_0, CN_0_0, nu_CNen, kappa_CNen, nu_WGen, kappa_WGen); R01_0_0 is "R01_0,0";  // modifiers: EWG_T_0_0, CN_0_0
  R02_0_0: en_0_0 => ; cell_0_0*T0_H_en*en_0_0; R02_0_0 is "R02_0,0";
  R03_0_0: => EN_0_0; cell_0_0*translation(T0_H_EN, en_0_0); R03_0_0 is "R03_0,0";  // modifiers: en_0_0
  R04_0_0: EN_0_0 => ; cell_0_0*T0_H_EN*EN_0_0; R04_0_0 is "R04_0,0";
  R05_0_0: => ci_0_0; cell_0_0*transcription_inducer_repressor_pair(T0_H_ci, B_0_0, EN_0_0, nu_ENci, kappa_ENci, nu_Bci, kappa_Bci); R05_0_0 is "R05_0,0";  // modifiers: B_0_0, EN_0_0
  R06_0_0: ci_0_0 => ; cell_0_0*T0_H_ci*ci_0_0; R06_0_0 is "R06_0,0";
  R07_0_0: => CI_0_0; cell_0_0*translation(T0_H_CI, ci_0_0); R07_0_0 is "R07_0,0";  // modifiers: ci_0_0
  R08_0_0: CI_0_0 => ; cell_0_0*T0_H_CI*CI_0_0; R08_0_0 is "R08_0,0";
  R09_0_0: CI_0_0 => CN_0_0; cell_0_0*first_order_w__activator(T0_C_CI, CI_0_0, PTC_T_0_0, nu_PTCCI, kappa_PTCCI); R09_0_0 is "R09_0,0";  // modifiers: PTC_T_0_0
  R10_0_0: CN_0_0 => ; cell_0_0*T0_H_CI*CN_0_0; R10_0_0 is "R10_0,0";
  R11_0_0: => hh_0_0; cell_0_0*transcription_inducer_repressor_pair(T0_H_hh, EN_0_0, CN_0_0, nu_CNhh, kappa_CNhh, nu_ENhh, kappa_ENhh); R11_0_0 is "R11_0,0";  // modifiers: EN_0_0, CN_0_0
  R12_0_0: hh_0_0 => ; cell_0_0*T0_H_hh*hh_0_0; R12_0_0 is "R12_0,0";
  R13_1_0_0: => HH1_0_0; cell_0_0*translation(T0_6H_HH, hh_0_0); R13_1_0_0 is "R13_1_0,0";  // modifiers: hh_0_0
  R13_2_0_0: => HH2_0_0; cell_0_0*translation(T0_6H_HH, hh_0_0); R13_2_0_0 is "R13_2_0,0";  // modifiers: hh_0_0
  R13_3_0_0: => HH3_0_0; cell_0_0*translation(T0_6H_HH, hh_0_0); R13_3_0_0 is "R13_3_0,0";  // modifiers: hh_0_0
  R13_4_0_0: => HH4_0_0; cell_0_0*translation(T0_6H_HH, hh_0_0); R13_4_0_0 is "R13_4_0,0";  // modifiers: hh_0_0
  R13_5_0_0: => HH5_0_0; cell_0_0*translation(T0_6H_HH, hh_0_0); R13_5_0_0 is "R13_5_0,0";  // modifiers: hh_0_0
  R13_6_0_0: => HH6_0_0; cell_0_0*translation(T0_6H_HH, hh_0_0); R13_6_0_0 is "R13_6_0,0";  // modifiers: hh_0_0
  R14_1_0_0: HH1_0_0 => ; cell_0_0*T0_H_HH*HH1_0_0; R14_1_0_0 is "R14_1_0,0";
  R14_2_0_0: HH2_0_0 => ; cell_0_0*T0_H_HH*HH2_0_0; R14_2_0_0 is "R14_2_0,0";
  R14_3_0_0: HH3_0_0 => ; cell_0_0*T0_H_HH*HH3_0_0; R14_3_0_0 is "R14_3_0,0";
  R14_4_0_0: HH4_0_0 => ; cell_0_0*T0_H_HH*HH4_0_0; R14_4_0_0 is "R14_4_0,0";
  R14_5_0_0: HH5_0_0 => ; cell_0_0*T0_H_HH*HH5_0_0; R14_5_0_0 is "R14_5_0,0";
  R14_6_0_0: HH6_0_0 => ; cell_0_0*T0_H_HH*HH6_0_0; R14_6_0_0 is "R14_6_0,0";
  R15_0_0: => ptc_0_0; cell_0_0*transcription_inducer_repressor_pair(T0_H_ptc, CI_0_0, CN_0_0, nu_CNptc, kappa_CNptc, nu_CIptc, kappa_CIptc); R15_0_0 is "R15_0,0";  // modifiers: CI_0_0, CN_0_0
  R16_0_0: ptc_0_0 => ; cell_0_0*T0_H_ptc*ptc_0_0; R16_0_0 is "R16_0,0";
  R17_1_0_0: => PTC1_0_0; cell_0_0*translation(T0_6H_PTC, ptc_0_0); R17_1_0_0 is "R17_1_0,0";  // modifiers: ptc_0_0
  R17_2_0_0: => PTC2_0_0; cell_0_0*translation(T0_6H_PTC, ptc_0_0); R17_2_0_0 is "R17_2_0,0";  // modifiers: ptc_0_0
  R17_3_0_0: => PTC3_0_0; cell_0_0*translation(T0_6H_PTC, ptc_0_0); R17_3_0_0 is "R17_3_0,0";  // modifiers: ptc_0_0
  R17_4_0_0: => PTC4_0_0; cell_0_0*translation(T0_6H_PTC, ptc_0_0); R17_4_0_0 is "R17_4_0,0";  // modifiers: ptc_0_0
  R17_5_0_0: => PTC5_0_0; cell_0_0*translation(T0_6H_PTC, ptc_0_0); R17_5_0_0 is "R17_5_0,0";  // modifiers: ptc_0_0
  R17_6_0_0: => PTC6_0_0; cell_0_0*translation(T0_6H_PTC, ptc_0_0); R17_6_0_0 is "R17_6_0,0";  // modifiers: ptc_0_0
  R18_1_0_0: PTC1_0_0 => ; cell_0_0*T0_H_PTC*PTC1_0_0; R18_1_0_0 is "R18_1_0,0";
  R18_2_0_0: PTC2_0_0 => ; cell_0_0*T0_H_PTC*PTC2_0_0; R18_2_0_0 is "R18_2_0,0";
  R18_3_0_0: PTC3_0_0 => ; cell_0_0*T0_H_PTC*PTC3_0_0; R18_3_0_0 is "R18_3_0,0";
  R18_4_0_0: PTC4_0_0 => ; cell_0_0*T0_H_PTC*PTC4_0_0; R18_4_0_0 is "R18_4_0,0";
  R18_5_0_0: PTC5_0_0 => ; cell_0_0*T0_H_PTC*PTC5_0_0; R18_5_0_0 is "R18_5_0,0";
  R18_6_0_0: PTC6_0_0 => ; cell_0_0*T0_H_PTC*PTC6_0_0; R18_6_0_0 is "R18_6_0,0";
  R19_0_0: => wg_0_0; cell_0_0*transcription_inducer_repressor_pair___inducer(T0_H_wg, alpha_CIwg, CI_0_0, CN_0_0, nu_CNwg, kappa_CNwg, nu_CIwg, kappa_CIwg, alpha_WGwg, IWG_0_0, nu_WGwg, kappa_WGwg); R19_0_0 is "R19_0,0";  // modifiers: CI_0_0, CN_0_0, IWG_0_0
  R20_0_0: wg_0_0 => ; cell_0_0*T0_H_wg*wg_0_0; R20_0_0 is "R20_0,0";
  R21_0_0: => IWG_0_0; cell_0_0*translation(T0_H_IWG, wg_0_0); R21_0_0 is "R21_0,0";  // modifiers: wg_0_0
  R22_0_0: IWG_0_0 => ; cell_0_0*T0_H_IWG*IWG_0_0; R22_0_0 is "R22_0,0";
  R23_1_0_0: IWG_0_0 => EWG1_0_0; cell_0_0*T0_r_ExoWG_6*IWG_0_0; R23_1_0_0 is "R23_1_0,0";
  R23_2_0_0: IWG_0_0 => EWG2_0_0; cell_0_0*T0_r_ExoWG_6*IWG_0_0; R23_2_0_0 is "R23_2_0,0";
  R23_3_0_0: IWG_0_0 => EWG3_0_0; cell_0_0*T0_r_ExoWG_6*IWG_0_0; R23_3_0_0 is "R23_3_0,0";
  R23_4_0_0: IWG_0_0 => EWG4_0_0; cell_0_0*T0_r_ExoWG_6*IWG_0_0; R23_4_0_0 is "R23_4_0,0";
  R23_5_0_0: IWG_0_0 => EWG5_0_0; cell_0_0*T0_r_ExoWG_6*IWG_0_0; R23_5_0_0 is "R23_5_0,0";
  R23_6_0_0: IWG_0_0 => EWG6_0_0; cell_0_0*T0_r_ExoWG_6*IWG_0_0; R23_6_0_0 is "R23_6_0,0";
  R24_1_0_0: EWG1_0_0 => IWG_0_0; cell_0_0*T0_r_EndoWG*EWG1_0_0; R24_1_0_0 is "R24_1_0,0";
  R24_2_0_0: EWG2_0_0 => IWG_0_0; cell_0_0*T0_r_EndoWG*EWG2_0_0; R24_2_0_0 is "R24_2_0,0";
  R24_3_0_0: EWG3_0_0 => IWG_0_0; cell_0_0*T0_r_EndoWG*EWG3_0_0; R24_3_0_0 is "R24_3_0,0";
  R24_4_0_0: EWG4_0_0 => IWG_0_0; cell_0_0*T0_r_EndoWG*EWG4_0_0; R24_4_0_0 is "R24_4_0,0";
  R24_5_0_0: EWG5_0_0 => IWG_0_0; cell_0_0*T0_r_EndoWG*EWG5_0_0; R24_5_0_0 is "R24_5_0,0";
  R24_6_0_0: EWG6_0_0 => IWG_0_0; cell_0_0*T0_r_EndoWG*EWG6_0_0; R24_6_0_0 is "R24_6_0,0";
  R25_1_0_0: EWG1_0_0 => ; cell_0_0*T0_H_EWG*EWG1_0_0; R25_1_0_0 is "R25_1_0,0";
  R25_2_0_0: EWG2_0_0 => ; cell_0_0*T0_H_EWG*EWG2_0_0; R25_2_0_0 is "R25_2_0,0";
  R25_3_0_0: EWG3_0_0 => ; cell_0_0*T0_H_EWG*EWG3_0_0; R25_3_0_0 is "R25_3_0,0";
  R25_4_0_0: EWG4_0_0 => ; cell_0_0*T0_H_EWG*EWG4_0_0; R25_4_0_0 is "R25_4_0,0";
  R25_5_0_0: EWG5_0_0 => ; cell_0_0*T0_H_EWG*EWG5_0_0; R25_5_0_0 is "R25_5_0,0";
  R25_6_0_0: EWG6_0_0 => ; cell_0_0*T0_H_EWG*EWG6_0_0; R25_6_0_0 is "R25_6_0,0";
  R26_16_0_0: EWG1_0_0 => EWG6_0_0; cell_0_0*T0_r_LMxferWG*EWG1_0_0; R26_16_0_0 is "R26_16_0,0";
  R26_61_0_0: EWG6_0_0 => EWG1_0_0; cell_0_0*T0_r_LMxferWG*EWG6_0_0; R26_61_0_0 is "R26_61_0,0";
  R26_12_0_0: EWG1_0_0 => EWG2_0_0; cell_0_0*T0_r_LMxferWG*EWG1_0_0; R26_12_0_0 is "R26_12_0,0";
  R26_21_0_0: EWG2_0_0 => EWG1_0_0; cell_0_0*T0_r_LMxferWG*EWG2_0_0; R26_21_0_0 is "R26_21_0,0";
  R26_23_0_0: EWG2_0_0 => EWG3_0_0; cell_0_0*T0_r_LMxferWG*EWG2_0_0; R26_23_0_0 is "R26_23_0,0";
  R26_32_0_0: EWG3_0_0 => EWG2_0_0; cell_0_0*T0_r_LMxferWG*EWG3_0_0; R26_32_0_0 is "R26_32_0,0";
  R26_34_0_0: EWG3_0_0 => EWG4_0_0; cell_0_0*T0_r_LMxferWG*EWG3_0_0; R26_34_0_0 is "R26_34_0,0";
  R26_43_0_0: EWG4_0_0 => EWG3_0_0; cell_0_0*T0_r_LMxferWG*EWG4_0_0; R26_43_0_0 is "R26_43_0,0";
  R26_45_0_0: EWG4_0_0 => EWG5_0_0; cell_0_0*T0_r_LMxferWG*EWG4_0_0; R26_45_0_0 is "R26_45_0,0";
  R26_54_0_0: EWG5_0_0 => EWG4_0_0; cell_0_0*T0_r_LMxferWG*EWG5_0_0; R26_54_0_0 is "R26_54_0,0";
  R26_56_0_0: EWG5_0_0 => EWG6_0_0; cell_0_0*T0_r_LMxferWG*EWG5_0_0; R26_56_0_0 is "R26_56_0,0";
  R26_65_0_0: EWG6_0_0 => EWG5_0_0; cell_0_0*T0_r_LMxferWG*EWG6_0_0; R26_65_0_0 is "R26_65_0,0";
  R27_16_0_0: PTC1_0_0 => PTC6_0_0; cell_0_0*T0_r_LMxferWG*PTC1_0_0; R27_16_0_0 is "R27_16_0,0";
  R27_61_0_0: PTC6_0_0 => PTC1_0_0; cell_0_0*T0_r_LMxferWG*PTC6_0_0; R27_61_0_0 is "R27_61_0,0";
  R27_12_0_0: PTC1_0_0 => PTC2_0_0; cell_0_0*T0_r_LMxferWG*PTC1_0_0; R27_12_0_0 is "R27_12_0,0";
  R27_21_0_0: PTC2_0_0 => PTC1_0_0; cell_0_0*T0_r_LMxferWG*PTC2_0_0; R27_21_0_0 is "R27_21_0,0";
  R27_23_0_0: PTC2_0_0 => PTC3_0_0; cell_0_0*T0_r_LMxferWG*PTC2_0_0; R27_23_0_0 is "R27_23_0,0";
  R27_32_0_0: PTC3_0_0 => PTC2_0_0; cell_0_0*T0_r_LMxferWG*PTC3_0_0; R27_32_0_0 is "R27_32_0,0";
  R27_34_0_0: PTC3_0_0 => PTC4_0_0; cell_0_0*T0_r_LMxferWG*PTC3_0_0; R27_34_0_0 is "R27_34_0,0";
  R27_43_0_0: PTC4_0_0 => PTC3_0_0; cell_0_0*T0_r_LMxferWG*PTC4_0_0; R27_43_0_0 is "R27_43_0,0";
  R27_45_0_0: PTC4_0_0 => PTC5_0_0; cell_0_0*T0_r_LMxferWG*PTC4_0_0; R27_45_0_0 is "R27_45_0,0";
  R27_54_0_0: PTC5_0_0 => PTC4_0_0; cell_0_0*T0_r_LMxferWG*PTC5_0_0; R27_54_0_0 is "R27_54_0,0";
  R27_56_0_0: PTC5_0_0 => PTC6_0_0; cell_0_0*T0_r_LMxferWG*PTC5_0_0; R27_56_0_0 is "R27_56_0,0";
  R27_65_0_0: PTC6_0_0 => PTC5_0_0; cell_0_0*T0_r_LMxferWG*PTC6_0_0; R27_65_0_0 is "R27_65_0,0";
  R28_16_0_0: HH1_0_0 => HH6_0_0; cell_0_0*T0_r_LMxferHH*HH1_0_0; R28_16_0_0 is "R28_16_0,0";
  R28_61_0_0: HH6_0_0 => HH1_0_0; cell_0_0*T0_r_LMxferHH*HH6_0_0; R28_61_0_0 is "R28_61_0,0";
  R28_12_0_0: HH1_0_0 => HH2_0_0; cell_0_0*T0_r_LMxferHH*HH1_0_0; R28_12_0_0 is "R28_12_0,0";
  R28_21_0_0: HH2_0_0 => HH1_0_0; cell_0_0*T0_r_LMxferHH*HH2_0_0; R28_21_0_0 is "R28_21_0,0";
  R28_23_0_0: HH2_0_0 => HH3_0_0; cell_0_0*T0_r_LMxferHH*HH2_0_0; R28_23_0_0 is "R28_23_0,0";
  R28_32_0_0: HH3_0_0 => HH2_0_0; cell_0_0*T0_r_LMxferHH*HH3_0_0; R28_32_0_0 is "R28_32_0,0";
  R28_34_0_0: HH3_0_0 => HH4_0_0; cell_0_0*T0_r_LMxferHH*HH3_0_0; R28_34_0_0 is "R28_34_0,0";
  R28_43_0_0: HH4_0_0 => HH3_0_0; cell_0_0*T0_r_LMxferHH*HH4_0_0; R28_43_0_0 is "R28_43_0,0";
  R28_45_0_0: HH4_0_0 => HH5_0_0; cell_0_0*T0_r_LMxferHH*HH4_0_0; R28_45_0_0 is "R28_45_0,0";
  R28_54_0_0: HH5_0_0 => HH4_0_0; cell_0_0*T0_r_LMxferHH*HH5_0_0; R28_54_0_0 is "R28_54_0,0";
  R28_56_0_0: HH5_0_0 => HH6_0_0; cell_0_0*T0_r_LMxferHH*HH5_0_0; R28_56_0_0 is "R28_56_0,0";
  R28_65_0_0: HH6_0_0 => HH5_0_0; cell_0_0*T0_r_LMxferHH*HH6_0_0; R28_65_0_0 is "R28_65_0,0";
  R29_1_0_0: PH1_0_0 => ; cell_0_0*T0_H_PH*PH1_0_0; R29_1_0_0 is "R29_1_0,0";
  R29_2_0_0: PH2_0_0 => ; cell_0_0*T0_H_PH*PH2_0_0; R29_2_0_0 is "R29_2_0,0";
  R29_3_0_0: PH3_0_0 => ; cell_0_0*T0_H_PH*PH3_0_0; R29_3_0_0 is "R29_3_0,0";
  R29_4_0_0: PH4_0_0 => ; cell_0_0*T0_H_PH*PH4_0_0; R29_4_0_0 is "R29_4_0,0";
  R29_5_0_0: PH5_0_0 => ; cell_0_0*T0_H_PH*PH5_0_0; R29_5_0_0 is "R29_5_0,0";
  R29_6_0_0: PH6_0_0 => ; cell_0_0*T0_H_PH*PH6_0_0; R29_6_0_0 is "R29_6_0,0";
  R01_0_1: => en_0_1; transcription_inducer_repressor_pair(T0_H_en, EWG_T_0_1, CN_0_1, nu_CNen, kappa_CNen, nu_WGen, kappa_WGen); R01_0_1 is "R01_0,1";  // modifiers: EWG_T_0_1, CN_0_1
  R02_0_1: en_0_1 => ; cell_0_1*T0_H_en*en_0_1; R02_0_1 is "R02_0,1";
  R03_0_1: => EN_0_1; cell_0_1*translation(T0_H_EN, en_0_1); R03_0_1 is "R03_0,1";  // modifiers: en_0_1
  R04_0_1: EN_0_1 => ; cell_0_1*T0_H_EN*EN_0_1; R04_0_1 is "R04_0,1";
  R05_0_1: => ci_0_1; cell_0_1*transcription_inducer_repressor_pair(T0_H_ci, B_0_1, EN_0_1, nu_ENci, kappa_ENci, nu_Bci, kappa_Bci); R05_0_1 is "R05_0,1";  // modifiers: B_0_1, EN_0_1
  R06_0_1: ci_0_1 => ; cell_0_1*T0_H_ci*ci_0_1; R06_0_1 is "R06_0,1";
  R07_0_1: => CI_0_1; cell_0_1*translation(T0_H_CI, ci_0_1); R07_0_1 is "R07_0,1";  // modifiers: ci_0_1
  R08_0_1: CI_0_1 => ; cell_0_1*T0_H_CI*CI_0_1; R08_0_1 is "R08_0,1";
  R09_0_1: CI_0_1 => CN_0_1; cell_0_1*first_order_w__activator(T0_C_CI, CI_0_1, PTC_T_0_1, nu_PTCCI, kappa_PTCCI); R09_0_1 is "R09_0,1";  // modifiers: PTC_T_0_1
  R10_0_1: CN_0_1 => ; cell_0_1*T0_H_CI*CN_0_1; R10_0_1 is "R10_0,1";
  R11_0_1: => hh_0_1; cell_0_1*transcription_inducer_repressor_pair(T0_H_hh, EN_0_1, CN_0_1, nu_CNhh, kappa_CNhh, nu_ENhh, kappa_ENhh); R11_0_1 is "R11_0,1";  // modifiers: EN_0_1, CN_0_1
  R12_0_1: hh_0_1 => ; cell_0_1*T0_H_hh*hh_0_1; R12_0_1 is "R12_0,1";
  R13_1_0_1: => HH1_0_1; cell_0_1*translation(T0_6H_HH, hh_0_1); R13_1_0_1 is "R13_1_0,1";  // modifiers: hh_0_1
  R13_2_0_1: => HH2_0_1; cell_0_1*translation(T0_6H_HH, hh_0_1); R13_2_0_1 is "R13_2_0,1";  // modifiers: hh_0_1
  R13_3_0_1: => HH3_0_1; cell_0_1*translation(T0_6H_HH, hh_0_1); R13_3_0_1 is "R13_3_0,1";  // modifiers: hh_0_1
  R13_4_0_1: => HH4_0_1; cell_0_1*translation(T0_6H_HH, hh_0_1); R13_4_0_1 is "R13_4_0,1";  // modifiers: hh_0_1
  R13_5_0_1: => HH5_0_1; cell_0_1*translation(T0_6H_HH, hh_0_1); R13_5_0_1 is "R13_5_0,1";  // modifiers: hh_0_1
  R13_6_0_1: => HH6_0_1; cell_0_1*translation(T0_6H_HH, hh_0_1); R13_6_0_1 is "R13_6_0,1";  // modifiers: hh_0_1
  R14_1_0_1: HH1_0_1 => ; cell_0_1*T0_H_HH*HH1_0_1; R14_1_0_1 is "R14_1_0,1";
  R14_2_0_1: HH2_0_1 => ; cell_0_1*T0_H_HH*HH2_0_1; R14_2_0_1 is "R14_2_0,1";
  R14_3_0_1: HH3_0_1 => ; cell_0_1*T0_H_HH*HH3_0_1; R14_3_0_1 is "R14_3_0,1";
  R14_4_0_1: HH4_0_1 => ; cell_0_1*T0_H_HH*HH4_0_1; R14_4_0_1 is "R14_4_0,1";
  R14_5_0_1: HH5_0_1 => ; cell_0_1*T0_H_HH*HH5_0_1; R14_5_0_1 is "R14_5_0,1";
  R14_6_0_1: HH6_0_1 => ; cell_0_1*T0_H_HH*HH6_0_1; R14_6_0_1 is "R14_6_0,1";
  R15_0_1: => ptc_0_1; cell_0_1*transcription_inducer_repressor_pair(T0_H_ptc, CI_0_1, CN_0_1, nu_CNptc, kappa_CNptc, nu_CIptc, kappa_CIptc); R15_0_1 is "R15_0,1";  // modifiers: CI_0_1, CN_0_1
  R16_0_1: ptc_0_1 => ; cell_0_1*T0_H_ptc*ptc_0_1; R16_0_1 is "R16_0,1";
  R17_1_0_1: => PTC1_0_1; cell_0_1*translation(T0_6H_PTC, ptc_0_1); R17_1_0_1 is "R17_1_0,1";  // modifiers: ptc_0_1
  R17_2_0_1: => PTC2_0_1; cell_0_1*translation(T0_6H_PTC, ptc_0_1); R17_2_0_1 is "R17_2_0,1";  // modifiers: ptc_0_1
  R17_3_0_1: => PTC3_0_1; cell_0_1*translation(T0_6H_PTC, ptc_0_1); R17_3_0_1 is "R17_3_0,1";  // modifiers: ptc_0_1
  R17_4_0_1: => PTC4_0_1; cell_0_1*translation(T0_6H_PTC, ptc_0_1); R17_4_0_1 is "R17_4_0,1";  // modifiers: ptc_0_1
  R17_5_0_1: => PTC5_0_1; cell_0_1*translation(T0_6H_PTC, ptc_0_1); R17_5_0_1 is "R17_5_0,1";  // modifiers: ptc_0_1
  R17_6_0_1: => PTC6_0_1; cell_0_1*translation(T0_6H_PTC, ptc_0_1); R17_6_0_1 is "R17_6_0,1";  // modifiers: ptc_0_1
  R18_1_0_1: PTC1_0_1 => ; cell_0_1*T0_H_PTC*PTC1_0_1; R18_1_0_1 is "R18_1_0,1";
  R18_2_0_1: PTC2_0_1 => ; cell_0_1*T0_H_PTC*PTC2_0_1; R18_2_0_1 is "R18_2_0,1";
  R18_3_0_1: PTC3_0_1 => ; cell_0_1*T0_H_PTC*PTC3_0_1; R18_3_0_1 is "R18_3_0,1";
  R18_4_0_1: PTC4_0_1 => ; cell_0_1*T0_H_PTC*PTC4_0_1; R18_4_0_1 is "R18_4_0,1";
  R18_5_0_1: PTC5_0_1 => ; cell_0_1*T0_H_PTC*PTC5_0_1; R18_5_0_1 is "R18_5_0,1";
  R18_6_0_1: PTC6_0_1 => ; cell_0_1*T0_H_PTC*PTC6_0_1; R18_6_0_1 is "R18_6_0,1";
  R19_0_1: => wg_0_1; cell_0_1*transcription_inducer_repressor_pair___inducer(T0_H_wg, alpha_CIwg, CI_0_1, CN_0_1, nu_CNwg, kappa_CNwg, nu_CIwg, kappa_CIwg, alpha_WGwg, IWG_0_1, nu_WGwg, kappa_WGwg); R19_0_1 is "R19_0,1";  // modifiers: CI_0_1, CN_0_1, IWG_0_1
  R20_0_1: wg_0_1 => ; cell_0_1*T0_H_wg*wg_0_1; R20_0_1 is "R20_0,1";
  R21_0_1: => IWG_0_1; cell_0_1*translation(T0_H_IWG, wg_0_1); R21_0_1 is "R21_0,1";  // modifiers: wg_0_1
  R22_0_1: IWG_0_1 => ; cell_0_1*T0_H_IWG*IWG_0_1; R22_0_1 is "R22_0,1";
  R23_1_0_1: IWG_0_1 => EWG1_0_1; cell_0_1*T0_r_ExoWG_6*IWG_0_1; R23_1_0_1 is "R23_1_0,1";
  R23_2_0_1: IWG_0_1 => EWG2_0_1; cell_0_1*T0_r_ExoWG_6*IWG_0_1; R23_2_0_1 is "R23_2_0,1";
  R23_3_0_1: IWG_0_1 => EWG3_0_1; cell_0_1*T0_r_ExoWG_6*IWG_0_1; R23_3_0_1 is "R23_3_0,1";
  R23_4_0_1: IWG_0_1 => EWG4_0_1; cell_0_1*T0_r_ExoWG_6*IWG_0_1; R23_4_0_1 is "R23_4_0,1";
  R23_5_0_1: IWG_0_1 => EWG5_0_1; cell_0_1*T0_r_ExoWG_6*IWG_0_1; R23_5_0_1 is "R23_5_0,1";
  R23_6_0_1: IWG_0_1 => EWG6_0_1; cell_0_1*T0_r_ExoWG_6*IWG_0_1; R23_6_0_1 is "R23_6_0,1";
  R24_1_0_1: EWG1_0_1 => IWG_0_1; cell_0_1*T0_r_EndoWG*EWG1_0_1; R24_1_0_1 is "R24_1_0,1";
  R24_2_0_1: EWG2_0_1 => IWG_0_1; cell_0_1*T0_r_EndoWG*EWG2_0_1; R24_2_0_1 is "R24_2_0,1";
  R24_3_0_1: EWG3_0_1 => IWG_0_1; cell_0_1*T0_r_EndoWG*EWG3_0_1; R24_3_0_1 is "R24_3_0,1";
  R24_4_0_1: EWG4_0_1 => IWG_0_1; cell_0_1*T0_r_EndoWG*EWG4_0_1; R24_4_0_1 is "R24_4_0,1";
  R24_5_0_1: EWG5_0_1 => IWG_0_1; cell_0_1*T0_r_EndoWG*EWG5_0_1; R24_5_0_1 is "R24_5_0,1";
  R24_6_0_1: EWG6_0_1 => IWG_0_1; cell_0_1*T0_r_EndoWG*EWG6_0_1; R24_6_0_1 is "R24_6_0,1";
  R25_1_0_1: EWG1_0_1 => ; cell_0_1*T0_H_EWG*EWG1_0_1; R25_1_0_1 is "R25_1_0,1";
  R25_2_0_1: EWG2_0_1 => ; cell_0_1*T0_H_EWG*EWG2_0_1; R25_2_0_1 is "R25_2_0,1";
  R25_3_0_1: EWG3_0_1 => ; cell_0_1*T0_H_EWG*EWG3_0_1; R25_3_0_1 is "R25_3_0,1";
  R25_4_0_1: EWG4_0_1 => ; cell_0_1*T0_H_EWG*EWG4_0_1; R25_4_0_1 is "R25_4_0,1";
  R25_5_0_1: EWG5_0_1 => ; cell_0_1*T0_H_EWG*EWG5_0_1; R25_5_0_1 is "R25_5_0,1";
  R25_6_0_1: EWG6_0_1 => ; cell_0_1*T0_H_EWG*EWG6_0_1; R25_6_0_1 is "R25_6_0,1";
  R26_16_0_1: EWG1_0_1 => EWG6_0_1; cell_0_1*T0_r_LMxferWG*EWG1_0_1; R26_16_0_1 is "R26_16_0,1";
  R26_61_0_1: EWG6_0_1 => EWG1_0_1; cell_0_1*T0_r_LMxferWG*EWG6_0_1; R26_61_0_1 is "R26_61_0,1";
  R26_12_0_1: EWG1_0_1 => EWG2_0_1; cell_0_1*T0_r_LMxferWG*EWG1_0_1; R26_12_0_1 is "R26_12_0,1";
  R26_21_0_1: EWG2_0_1 => EWG1_0_1; cell_0_1*T0_r_LMxferWG*EWG2_0_1; R26_21_0_1 is "R26_21_0,1";
  R26_23_0_1: EWG2_0_1 => EWG3_0_1; cell_0_1*T0_r_LMxferWG*EWG2_0_1; R26_23_0_1 is "R26_23_0,1";
  R26_32_0_1: EWG3_0_1 => EWG2_0_1; cell_0_1*T0_r_LMxferWG*EWG3_0_1; R26_32_0_1 is "R26_32_0,1";
  R26_34_0_1: EWG3_0_1 => EWG4_0_1; cell_0_1*T0_r_LMxferWG*EWG3_0_1; R26_34_0_1 is "R26_34_0,1";
  R26_43_0_1: EWG4_0_1 => EWG3_0_1; cell_0_1*T0_r_LMxferWG*EWG4_0_1; R26_43_0_1 is "R26_43_0,1";
  R26_45_0_1: EWG4_0_1 => EWG5_0_1; cell_0_1*T0_r_LMxferWG*EWG4_0_1; R26_45_0_1 is "R26_45_0,1";
  R26_54_0_1: EWG5_0_1 => EWG4_0_1; cell_0_1*T0_r_LMxferWG*EWG5_0_1; R26_54_0_1 is "R26_54_0,1";
  R26_56_0_1: EWG5_0_1 => EWG6_0_1; cell_0_1*T0_r_LMxferWG*EWG5_0_1; R26_56_0_1 is "R26_56_0,1";
  R26_65_0_1: EWG6_0_1 => EWG5_0_1; cell_0_1*T0_r_LMxferWG*EWG6_0_1; R26_65_0_1 is "R26_65_0,1";
  R27_16_0_1: PTC1_0_1 => PTC6_0_1; cell_0_1*T0_r_LMxferWG*PTC1_0_1; R27_16_0_1 is "R27_16_0,1";
  R27_61_0_1: PTC6_0_1 => PTC1_0_1; cell_0_1*T0_r_LMxferWG*PTC6_0_1; R27_61_0_1 is "R27_61_0,1";
  R27_12_0_1: PTC1_0_1 => PTC2_0_1; cell_0_1*T0_r_LMxferWG*PTC1_0_1; R27_12_0_1 is "R27_12_0,1";
  R27_21_0_1: PTC2_0_1 => PTC1_0_1; cell_0_1*T0_r_LMxferWG*PTC2_0_1; R27_21_0_1 is "R27_21_0,1";
  R27_23_0_1: PTC2_0_1 => PTC3_0_1; cell_0_1*T0_r_LMxferWG*PTC2_0_1; R27_23_0_1 is "R27_23_0,1";
  R27_32_0_1: PTC3_0_1 => PTC2_0_1; cell_0_1*T0_r_LMxferWG*PTC3_0_1; R27_32_0_1 is "R27_32_0,1";
  R27_34_0_1: PTC3_0_1 => PTC4_0_1; cell_0_1*T0_r_LMxferWG*PTC3_0_1; R27_34_0_1 is "R27_34_0,1";
  R27_43_0_1: PTC4_0_1 => PTC3_0_1; cell_0_1*T0_r_LMxferWG*PTC4_0_1; R27_43_0_1 is "R27_43_0,1";
  R27_45_0_1: PTC4_0_1 => PTC5_0_1; cell_0_1*T0_r_LMxferWG*PTC4_0_1; R27_45_0_1 is "R27_45_0,1";
  R27_54_0_1: PTC5_0_1 => PTC4_0_1; cell_0_1*T0_r_LMxferWG*PTC5_0_1; R27_54_0_1 is "R27_54_0,1";
  R27_56_0_1: PTC5_0_1 => PTC6_0_1; cell_0_1*T0_r_LMxferWG*PTC5_0_1; R27_56_0_1 is "R27_56_0,1";
  R27_65_0_1: PTC6_0_1 => PTC5_0_1; cell_0_1*T0_r_LMxferWG*PTC6_0_1; R27_65_0_1 is "R27_65_0,1";
  R28_16_0_1: HH1_0_1 => HH6_0_1; cell_0_1*T0_r_LMxferHH*HH1_0_1; R28_16_0_1 is "R28_16_0,1";
  R28_61_0_1: HH6_0_1 => HH1_0_1; cell_0_1*T0_r_LMxferHH*HH6_0_1; R28_61_0_1 is "R28_61_0,1";
  R28_12_0_1: HH1_0_1 => HH2_0_1; cell_0_1*T0_r_LMxferHH*HH1_0_1; R28_12_0_1 is "R28_12_0,1";
  R28_21_0_1: HH2_0_1 => HH1_0_1; cell_0_1*T0_r_LMxferHH*HH2_0_1; R28_21_0_1 is "R28_21_0,1";
  R28_23_0_1: HH2_0_1 => HH3_0_1; cell_0_1*T0_r_LMxferHH*HH2_0_1; R28_23_0_1 is "R28_23_0,1";
  R28_32_0_1: HH3_0_1 => HH2_0_1; cell_0_1*T0_r_LMxferHH*HH3_0_1; R28_32_0_1 is "R28_32_0,1";
  R28_34_0_1: HH3_0_1 => HH4_0_1; cell_0_1*T0_r_LMxferHH*HH3_0_1; R28_34_0_1 is "R28_34_0,1";
  R28_43_0_1: HH4_0_1 => HH3_0_1; cell_0_1*T0_r_LMxferHH*HH4_0_1; R28_43_0_1 is "R28_43_0,1";
  R28_45_0_1: HH4_0_1 => HH5_0_1; cell_0_1*T0_r_LMxferHH*HH4_0_1; R28_45_0_1 is "R28_45_0,1";
  R28_54_0_1: HH5_0_1 => HH4_0_1; cell_0_1*T0_r_LMxferHH*HH5_0_1; R28_54_0_1 is "R28_54_0,1";
  R28_56_0_1: HH5_0_1 => HH6_0_1; cell_0_1*T0_r_LMxferHH*HH5_0_1; R28_56_0_1 is "R28_56_0,1";
  R28_65_0_1: HH6_0_1 => HH5_0_1; cell_0_1*T0_r_LMxferHH*HH6_0_1; R28_65_0_1 is "R28_65_0,1";
  R29_1_0_1: PH1_0_1 => ; cell_0_1*T0_H_PH*PH1_0_1; R29_1_0_1 is "R29_1_0,1";
  R29_2_0_1: PH2_0_1 => ; cell_0_1*T0_H_PH*PH2_0_1; R29_2_0_1 is "R29_2_0,1";
  R29_3_0_1: PH3_0_1 => ; cell_0_1*T0_H_PH*PH3_0_1; R29_3_0_1 is "R29_3_0,1";
  R29_4_0_1: PH4_0_1 => ; cell_0_1*T0_H_PH*PH4_0_1; R29_4_0_1 is "R29_4_0,1";
  R29_5_0_1: PH5_0_1 => ; cell_0_1*T0_H_PH*PH5_0_1; R29_5_0_1 is "R29_5_0,1";
  R29_6_0_1: PH6_0_1 => ; cell_0_1*T0_H_PH*PH6_0_1; R29_6_0_1 is "R29_6_0,1";
  R01_0_2: => en_0_2; transcription_inducer_repressor_pair(T0_H_en, EWG_T_0_2, CN_0_2, nu_CNen, kappa_CNen, nu_WGen, kappa_WGen); R01_0_2 is "R01_0,2";  // modifiers: EWG_T_0_2, CN_0_2
  R02_0_2: en_0_2 => ; cell_0_2*T0_H_en*en_0_2; R02_0_2 is "R02_0,2";
  R03_0_2: => EN_0_2; cell_0_2*translation(T0_H_EN, en_0_2); R03_0_2 is "R03_0,2";  // modifiers: en_0_2
  R04_0_2: EN_0_2 => ; cell_0_2*T0_H_EN*EN_0_2; R04_0_2 is "R04_0,2";
  R05_0_2: => ci_0_2; cell_0_2*transcription_inducer_repressor_pair(T0_H_ci, B_0_2, EN_0_2, nu_ENci, kappa_ENci, nu_Bci, kappa_Bci); R05_0_2 is "R05_0,2";  // modifiers: B_0_2, EN_0_2
  R06_0_2: ci_0_2 => ; cell_0_2*T0_H_ci*ci_0_2; R06_0_2 is "R06_0,2";
  R07_0_2: => CI_0_2; cell_0_2*translation(T0_H_CI, ci_0_2); R07_0_2 is "R07_0,2";  // modifiers: ci_0_2
  R08_0_2: CI_0_2 => ; cell_0_2*T0_H_CI*CI_0_2; R08_0_2 is "R08_0,2";
  R09_0_2: CI_0_2 => CN_0_2; cell_0_2*first_order_w__activator(T0_C_CI, CI_0_2, PTC_T_0_2, nu_PTCCI, kappa_PTCCI); R09_0_2 is "R09_0,2";  // modifiers: PTC_T_0_2
  R10_0_2: CN_0_2 => ; cell_0_2*T0_H_CI*CN_0_2; R10_0_2 is "R10_0,2";
  R11_0_2: => hh_0_2; cell_0_2*transcription_inducer_repressor_pair(T0_H_hh, EN_0_2, CN_0_2, nu_CNhh, kappa_CNhh, nu_ENhh, kappa_ENhh); R11_0_2 is "R11_0,2";  // modifiers: EN_0_2, CN_0_2
  R12_0_2: hh_0_2 => ; cell_0_2*T0_H_hh*hh_0_2; R12_0_2 is "R12_0,2";
  R13_1_0_2: => HH1_0_2; cell_0_2*translation(T0_6H_HH, hh_0_2); R13_1_0_2 is "R13_1_0,2";  // modifiers: hh_0_2
  R13_2_0_2: => HH2_0_2; cell_0_2*translation(T0_6H_HH, hh_0_2); R13_2_0_2 is "R13_2_0,2";  // modifiers: hh_0_2
  R13_3_0_2: => HH3_0_2; cell_0_2*translation(T0_6H_HH, hh_0_2); R13_3_0_2 is "R13_3_0,2";  // modifiers: hh_0_2
  R13_4_0_2: => HH4_0_2; cell_0_2*translation(T0_6H_HH, hh_0_2); R13_4_0_2 is "R13_4_0,2";  // modifiers: hh_0_2
  R13_5_0_2: => HH5_0_2; cell_0_2*translation(T0_6H_HH, hh_0_2); R13_5_0_2 is "R13_5_0,2";  // modifiers: hh_0_2
  R13_6_0_2: => HH6_0_2; cell_0_2*translation(T0_6H_HH, hh_0_2); R13_6_0_2 is "R13_6_0,2";  // modifiers: hh_0_2
  R14_1_0_2: HH1_0_2 => ; cell_0_2*T0_H_HH*HH1_0_2; R14_1_0_2 is "R14_1_0,2";
  R14_2_0_2: HH2_0_2 => ; cell_0_2*T0_H_HH*HH2_0_2; R14_2_0_2 is "R14_2_0,2";
  R14_3_0_2: HH3_0_2 => ; cell_0_2*T0_H_HH*HH3_0_2; R14_3_0_2 is "R14_3_0,2";
  R14_4_0_2: HH4_0_2 => ; cell_0_2*T0_H_HH*HH4_0_2; R14_4_0_2 is "R14_4_0,2";
  R14_5_0_2: HH5_0_2 => ; cell_0_2*T0_H_HH*HH5_0_2; R14_5_0_2 is "R14_5_0,2";
  R14_6_0_2: HH6_0_2 => ; cell_0_2*T0_H_HH*HH6_0_2; R14_6_0_2 is "R14_6_0,2";
  R15_0_2: => ptc_0_2; cell_0_2*transcription_inducer_repressor_pair(T0_H_ptc, CI_0_2, CN_0_2, nu_CNptc, kappa_CNptc, nu_CIptc, kappa_CIptc); R15_0_2 is "R15_0,2";  // modifiers: CI_0_2, CN_0_2
  R16_0_2: ptc_0_2 => ; cell_0_2*T0_H_ptc*ptc_0_2; R16_0_2 is "R16_0,2";
  R17_1_0_2: => PTC1_0_2; cell_0_2*translation(T0_6H_PTC, ptc_0_2); R17_1_0_2 is "R17_1_0,2";  // modifiers: ptc_0_2
  R17_2_0_2: => PTC2_0_2; cell_0_2*translation(T0_6H_PTC, ptc_0_2); R17_2_0_2 is "R17_2_0,2";  // modifiers: ptc_0_2
  R17_3_0_2: => PTC3_0_2; cell_0_2*translation(T0_6H_PTC, ptc_0_2); R17_3_0_2 is "R17_3_0,2";  // modifiers: ptc_0_2
  R17_4_0_2: => PTC4_0_2; cell_0_2*translation(T0_6H_PTC, ptc_0_2); R17_4_0_2 is "R17_4_0,2";  // modifiers: ptc_0_2
  R17_5_0_2: => PTC5_0_2; cell_0_2*translation(T0_6H_PTC, ptc_0_2); R17_5_0_2 is "R17_5_0,2";  // modifiers: ptc_0_2
  R17_6_0_2: => PTC6_0_2; cell_0_2*translation(T0_6H_PTC, ptc_0_2); R17_6_0_2 is "R17_6_0,2";  // modifiers: ptc_0_2
  R18_1_0_2: PTC1_0_2 => ; cell_0_2*T0_H_PTC*PTC1_0_2; R18_1_0_2 is "R18_1_0,2";
  R18_2_0_2: PTC2_0_2 => ; cell_0_2*T0_H_PTC*PTC2_0_2; R18_2_0_2 is "R18_2_0,2";
  R18_3_0_2: PTC3_0_2 => ; cell_0_2*T0_H_PTC*PTC3_0_2; R18_3_0_2 is "R18_3_0,2";
  R18_4_0_2: PTC4_0_2 => ; cell_0_2*T0_H_PTC*PTC4_0_2; R18_4_0_2 is "R18_4_0,2";
  R18_5_0_2: PTC5_0_2 => ; cell_0_2*T0_H_PTC*PTC5_0_2; R18_5_0_2 is "R18_5_0,2";
  R18_6_0_2: PTC6_0_2 => ; cell_0_2*T0_H_PTC*PTC6_0_2; R18_6_0_2 is "R18_6_0,2";
  R19_0_2: => wg_0_2; cell_0_2*transcription_inducer_repressor_pair___inducer(T0_H_wg, alpha_CIwg, CI_0_2, CN_0_2, nu_CNwg, kappa_CNwg, nu_CIwg, kappa_CIwg, alpha_WGwg, IWG_0_2, nu_WGwg, kappa_WGwg); R19_0_2 is "R19_0,2";  // modifiers: CI_0_2, CN_0_2, IWG_0_2
  R20_0_2: wg_0_2 => ; cell_0_2*T0_H_wg*wg_0_2; R20_0_2 is "R20_0,2";
  R21_0_2: => IWG_0_2; cell_0_2*translation(T0_H_IWG, wg_0_2); R21_0_2 is "R21_0,2";  // modifiers: wg_0_2
  R22_0_2: IWG_0_2 => ; cell_0_2*T0_H_IWG*IWG_0_2; R22_0_2 is "R22_0,2";
  R23_1_0_2: IWG_0_2 => EWG1_0_2; cell_0_2*T0_r_ExoWG_6*IWG_0_2; R23_1_0_2 is "R23_1_0,2";
  R23_2_0_2: IWG_0_2 => EWG2_0_2; cell_0_2*T0_r_ExoWG_6*IWG_0_2; R23_2_0_2 is "R23_2_0,2";
  R23_3_0_2: IWG_0_2 => EWG3_0_2; cell_0_2*T0_r_ExoWG_6*IWG_0_2; R23_3_0_2 is "R23_3_0,2";
  R23_4_0_2: IWG_0_2 => EWG4_0_2; cell_0_2*T0_r_ExoWG_6*IWG_0_2; R23_4_0_2 is "R23_4_0,2";
  R23_5_0_2: IWG_0_2 => EWG5_0_2; cell_0_2*T0_r_ExoWG_6*IWG_0_2; R23_5_0_2 is "R23_5_0,2";
  R23_6_0_2: IWG_0_2 => EWG6_0_2; cell_0_2*T0_r_ExoWG_6*IWG_0_2; R23_6_0_2 is "R23_6_0,2";
  R24_1_0_2: EWG1_0_2 => IWG_0_2; cell_0_2*T0_r_EndoWG*EWG1_0_2; R24_1_0_2 is "R24_1_0,2";
  R24_2_0_2: EWG2_0_2 => IWG_0_2; cell_0_2*T0_r_EndoWG*EWG2_0_2; R24_2_0_2 is "R24_2_0,2";
  R24_3_0_2: EWG3_0_2 => IWG_0_2; cell_0_2*T0_r_EndoWG*EWG3_0_2; R24_3_0_2 is "R24_3_0,2";
  R24_4_0_2: EWG4_0_2 => IWG_0_2; cell_0_2*T0_r_EndoWG*EWG4_0_2; R24_4_0_2 is "R24_4_0,2";
  R24_5_0_2: EWG5_0_2 => IWG_0_2; cell_0_2*T0_r_EndoWG*EWG5_0_2; R24_5_0_2 is "R24_5_0,2";
  R24_6_0_2: EWG6_0_2 => IWG_0_2; cell_0_2*T0_r_EndoWG*EWG6_0_2; R24_6_0_2 is "R24_6_0,2";
  R25_1_0_2: EWG1_0_2 => ; cell_0_2*T0_H_EWG*EWG1_0_2; R25_1_0_2 is "R25_1_0,2";
  R25_2_0_2: EWG2_0_2 => ; cell_0_2*T0_H_EWG*EWG2_0_2; R25_2_0_2 is "R25_2_0,2";
  R25_3_0_2: EWG3_0_2 => ; cell_0_2*T0_H_EWG*EWG3_0_2; R25_3_0_2 is "R25_3_0,2";
  R25_4_0_2: EWG4_0_2 => ; cell_0_2*T0_H_EWG*EWG4_0_2; R25_4_0_2 is "R25_4_0,2";
  R25_5_0_2: EWG5_0_2 => ; cell_0_2*T0_H_EWG*EWG5_0_2; R25_5_0_2 is "R25_5_0,2";
  R25_6_0_2: EWG6_0_2 => ; cell_0_2*T0_H_EWG*EWG6_0_2; R25_6_0_2 is "R25_6_0,2";
  R26_16_0_2: EWG1_0_2 => EWG6_0_2; cell_0_2*T0_r_LMxferWG*EWG1_0_2; R26_16_0_2 is "R26_16_0,2";
  R26_61_0_2: EWG6_0_2 => EWG1_0_2; cell_0_2*T0_r_LMxferWG*EWG6_0_2; R26_61_0_2 is "R26_61_0,2";
  R26_12_0_2: EWG1_0_2 => EWG2_0_2; cell_0_2*T0_r_LMxferWG*EWG1_0_2; R26_12_0_2 is "R26_12_0,2";
  R26_21_0_2: EWG2_0_2 => EWG1_0_2; cell_0_2*T0_r_LMxferWG*EWG2_0_2; R26_21_0_2 is "R26_21_0,2";
  R26_23_0_2: EWG2_0_2 => EWG3_0_2; cell_0_2*T0_r_LMxferWG*EWG2_0_2; R26_23_0_2 is "R26_23_0,2";
  R26_32_0_2: EWG3_0_2 => EWG2_0_2; cell_0_2*T0_r_LMxferWG*EWG3_0_2; R26_32_0_2 is "R26_32_0,2";
  R26_34_0_2: EWG3_0_2 => EWG4_0_2; cell_0_2*T0_r_LMxferWG*EWG3_0_2; R26_34_0_2 is "R26_34_0,2";
  R26_43_0_2: EWG4_0_2 => EWG3_0_2; cell_0_2*T0_r_LMxferWG*EWG4_0_2; R26_43_0_2 is "R26_43_0,2";
  R26_45_0_2: EWG4_0_2 => EWG5_0_2; cell_0_2*T0_r_LMxferWG*EWG4_0_2; R26_45_0_2 is "R26_45_0,2";
  R26_54_0_2: EWG5_0_2 => EWG4_0_2; cell_0_2*T0_r_LMxferWG*EWG5_0_2; R26_54_0_2 is "R26_54_0,2";
  R26_56_0_2: EWG5_0_2 => EWG6_0_2; cell_0_2*T0_r_LMxferWG*EWG5_0_2; R26_56_0_2 is "R26_56_0,2";
  R26_65_0_2: EWG6_0_2 => EWG5_0_2; cell_0_2*T0_r_LMxferWG*EWG6_0_2; R26_65_0_2 is "R26_65_0,2";
  R27_16_0_2: PTC1_0_2 => PTC6_0_2; cell_0_2*T0_r_LMxferWG*PTC1_0_2; R27_16_0_2 is "R27_16_0,2";
  R27_61_0_2: PTC6_0_2 => PTC1_0_2; cell_0_2*T0_r_LMxferWG*PTC6_0_2; R27_61_0_2 is "R27_61_0,2";
  R27_12_0_2: PTC1_0_2 => PTC2_0_2; cell_0_2*T0_r_LMxferWG*PTC1_0_2; R27_12_0_2 is "R27_12_0,2";
  R27_21_0_2: PTC2_0_2 => PTC1_0_2; cell_0_2*T0_r_LMxferWG*PTC2_0_2; R27_21_0_2 is "R27_21_0,2";
  R27_23_0_2: PTC2_0_2 => PTC3_0_2; cell_0_2*T0_r_LMxferWG*PTC2_0_2; R27_23_0_2 is "R27_23_0,2";
  R27_32_0_2: PTC3_0_2 => PTC2_0_2; cell_0_2*T0_r_LMxferWG*PTC3_0_2; R27_32_0_2 is "R27_32_0,2";
  R27_34_0_2: PTC3_0_2 => PTC4_0_2; cell_0_2*T0_r_LMxferWG*PTC3_0_2; R27_34_0_2 is "R27_34_0,2";
  R27_43_0_2: PTC4_0_2 => PTC3_0_2; cell_0_2*T0_r_LMxferWG*PTC4_0_2; R27_43_0_2 is "R27_43_0,2";
  R27_45_0_2: PTC4_0_2 => PTC5_0_2; cell_0_2*T0_r_LMxferWG*PTC4_0_2; R27_45_0_2 is "R27_45_0,2";
  R27_54_0_2: PTC5_0_2 => PTC4_0_2; cell_0_2*T0_r_LMxferWG*PTC5_0_2; R27_54_0_2 is "R27_54_0,2";
  R27_56_0_2: PTC5_0_2 => PTC6_0_2; cell_0_2*T0_r_LMxferWG*PTC5_0_2; R27_56_0_2 is "R27_56_0,2";
  R27_65_0_2: PTC6_0_2 => PTC5_0_2; cell_0_2*T0_r_LMxferWG*PTC6_0_2; R27_65_0_2 is "R27_65_0,2";
  R28_16_0_2: HH1_0_2 => HH6_0_2; cell_0_2*T0_r_LMxferHH*HH1_0_2; R28_16_0_2 is "R28_16_0,2";
  R28_61_0_2: HH6_0_2 => HH1_0_2; cell_0_2*T0_r_LMxferHH*HH6_0_2; R28_61_0_2 is "R28_61_0,2";
  R28_12_0_2: HH1_0_2 => HH2_0_2; cell_0_2*T0_r_LMxferHH*HH1_0_2; R28_12_0_2 is "R28_12_0,2";
  R28_21_0_2: HH2_0_2 => HH1_0_2; cell_0_2*T0_r_LMxferHH*HH2_0_2; R28_21_0_2 is "R28_21_0,2";
  R28_23_0_2: HH2_0_2 => HH3_0_2; cell_0_2*T0_r_LMxferHH*HH2_0_2; R28_23_0_2 is "R28_23_0,2";
  R28_32_0_2: HH3_0_2 => HH2_0_2; cell_0_2*T0_r_LMxferHH*HH3_0_2; R28_32_0_2 is "R28_32_0,2";
  R28_34_0_2: HH3_0_2 => HH4_0_2; cell_0_2*T0_r_LMxferHH*HH3_0_2; R28_34_0_2 is "R28_34_0,2";
  R28_43_0_2: HH4_0_2 => HH3_0_2; cell_0_2*T0_r_LMxferHH*HH4_0_2; R28_43_0_2 is "R28_43_0,2";
  R28_45_0_2: HH4_0_2 => HH5_0_2; cell_0_2*T0_r_LMxferHH*HH4_0_2; R28_45_0_2 is "R28_45_0,2";
  R28_54_0_2: HH5_0_2 => HH4_0_2; cell_0_2*T0_r_LMxferHH*HH5_0_2; R28_54_0_2 is "R28_54_0,2";
  R28_56_0_2: HH5_0_2 => HH6_0_2; cell_0_2*T0_r_LMxferHH*HH5_0_2; R28_56_0_2 is "R28_56_0,2";
  R28_65_0_2: HH6_0_2 => HH5_0_2; cell_0_2*T0_r_LMxferHH*HH6_0_2; R28_65_0_2 is "R28_65_0,2";
  R29_1_0_2: PH1_0_2 => ; cell_0_2*T0_H_PH*PH1_0_2; R29_1_0_2 is "R29_1_0,2";
  R29_2_0_2: PH2_0_2 => ; cell_0_2*T0_H_PH*PH2_0_2; R29_2_0_2 is "R29_2_0,2";
  R29_3_0_2: PH3_0_2 => ; cell_0_2*T0_H_PH*PH3_0_2; R29_3_0_2 is "R29_3_0,2";
  R29_4_0_2: PH4_0_2 => ; cell_0_2*T0_H_PH*PH4_0_2; R29_4_0_2 is "R29_4_0,2";
  R29_5_0_2: PH5_0_2 => ; cell_0_2*T0_H_PH*PH5_0_2; R29_5_0_2 is "R29_5_0,2";
  R29_6_0_2: PH6_0_2 => ; cell_0_2*T0_H_PH*PH6_0_2; R29_6_0_2 is "R29_6_0,2";
  R01_0_3: => en_0_3; transcription_inducer_repressor_pair(T0_H_en, EWG_T_0_3, CN_0_3, nu_CNen, kappa_CNen, nu_WGen, kappa_WGen); R01_0_3 is "R01_0,3";  // modifiers: EWG_T_0_3, CN_0_3
  R02_0_3: en_0_3 => ; cell_0_3*T0_H_en*en_0_3; R02_0_3 is "R02_0,3";
  R03_0_3: => EN_0_3; cell_0_3*translation(T0_H_EN, en_0_3); R03_0_3 is "R03_0,3";  // modifiers: en_0_3
  R04_0_3: EN_0_3 => ; cell_0_3*T0_H_EN*EN_0_3; R04_0_3 is "R04_0,3";
  R05_0_3: => ci_0_3; cell_0_3*transcription_inducer_repressor_pair(T0_H_ci, B_0_3, EN_0_3, nu_ENci, kappa_ENci, nu_Bci, kappa_Bci); R05_0_3 is "R05_0,3";  // modifiers: B_0_3, EN_0_3
  R06_0_3: ci_0_3 => ; cell_0_3*T0_H_ci*ci_0_3; R06_0_3 is "R06_0,3";
  R07_0_3: => CI_0_3; cell_0_3*translation(T0_H_CI, ci_0_3); R07_0_3 is "R07_0,3";  // modifiers: ci_0_3
  R08_0_3: CI_0_3 => ; cell_0_3*T0_H_CI*CI_0_3; R08_0_3 is "R08_0,3";
  R09_0_3: CI_0_3 => CN_0_3; cell_0_3*first_order_w__activator(T0_C_CI, CI_0_3, PTC_T_0_3, nu_PTCCI, kappa_PTCCI); R09_0_3 is "R09_0,3";  // modifiers: PTC_T_0_3
  R10_0_3: CN_0_3 => ; cell_0_3*T0_H_CI*CN_0_3; R10_0_3 is "R10_0,3";
  R11_0_3: => hh_0_3; cell_0_3*transcription_inducer_repressor_pair(T0_H_hh, EN_0_3, CN_0_3, nu_CNhh, kappa_CNhh, nu_ENhh, kappa_ENhh); R11_0_3 is "R11_0,3";  // modifiers: EN_0_3, CN_0_3
  R12_0_3: hh_0_3 => ; cell_0_3*T0_H_hh*hh_0_3; R12_0_3 is "R12_0,3";
  R13_1_0_3: => HH1_0_3; cell_0_3*translation(T0_6H_HH, hh_0_3); R13_1_0_3 is "R13_1_0,3";  // modifiers: hh_0_3
  R13_2_0_3: => HH2_0_3; cell_0_3*translation(T0_6H_HH, hh_0_3); R13_2_0_3 is "R13_2_0,3";  // modifiers: hh_0_3
  R13_3_0_3: => HH3_0_3; cell_0_3*translation(T0_6H_HH, hh_0_3); R13_3_0_3 is "R13_3_0,3";  // modifiers: hh_0_3
  R13_4_0_3: => HH4_0_3; cell_0_3*translation(T0_6H_HH, hh_0_3); R13_4_0_3 is "R13_4_0,3";  // modifiers: hh_0_3
  R13_5_0_3: => HH5_0_3; cell_0_3*translation(T0_6H_HH, hh_0_3); R13_5_0_3 is "R13_5_0,3";  // modifiers: hh_0_3
  R13_6_0_3: => HH6_0_3; cell_0_3*translation(T0_6H_HH, hh_0_3); R13_6_0_3 is "R13_6_0,3";  // modifiers: hh_0_3
  R14_1_0_3: HH1_0_3 => ; cell_0_3*T0_H_HH*HH1_0_3; R14_1_0_3 is "R14_1_0,3";
  R14_2_0_3: HH2_0_3 => ; cell_0_3*T0_H_HH*HH2_0_3; R14_2_0_3 is "R14_2_0,3";
  R14_3_0_3: HH3_0_3 => ; cell_0_3*T0_H_HH*HH3_0_3; R14_3_0_3 is "R14_3_0,3";
  R14_4_0_3: HH4_0_3 => ; cell_0_3*T0_H_HH*HH4_0_3; R14_4_0_3 is "R14_4_0,3";
  R14_5_0_3: HH5_0_3 => ; cell_0_3*T0_H_HH*HH5_0_3; R14_5_0_3 is "R14_5_0,3";
  R14_6_0_3: HH6_0_3 => ; cell_0_3*T0_H_HH*HH6_0_3; R14_6_0_3 is "R14_6_0,3";
  R15_0_3: => ptc_0_3; cell_0_3*transcription_inducer_repressor_pair(T0_H_ptc, CI_0_3, CN_0_3, nu_CNptc, kappa_CNptc, nu_CIptc, kappa_CIptc); R15_0_3 is "R15_0,3";  // modifiers: CI_0_3, CN_0_3
  R16_0_3: ptc_0_3 => ; cell_0_3*T0_H_ptc*ptc_0_3; R16_0_3 is "R16_0,3";
  R17_1_0_3: => PTC1_0_3; cell_0_3*translation(T0_6H_PTC, ptc_0_3); R17_1_0_3 is "R17_1_0,3";  // modifiers: ptc_0_3
  R17_2_0_3: => PTC2_0_3; cell_0_3*translation(T0_6H_PTC, ptc_0_3); R17_2_0_3 is "R17_2_0,3";  // modifiers: ptc_0_3
  R17_3_0_3: => PTC3_0_3; cell_0_3*translation(T0_6H_PTC, ptc_0_3); R17_3_0_3 is "R17_3_0,3";  // modifiers: ptc_0_3
  R17_4_0_3: => PTC4_0_3; cell_0_3*translation(T0_6H_PTC, ptc_0_3); R17_4_0_3 is "R17_4_0,3";  // modifiers: ptc_0_3
  R17_5_0_3: => PTC5_0_3; cell_0_3*translation(T0_6H_PTC, ptc_0_3); R17_5_0_3 is "R17_5_0,3";  // modifiers: ptc_0_3
  R17_6_0_3: => PTC6_0_3; cell_0_3*translation(T0_6H_PTC, ptc_0_3); R17_6_0_3 is "R17_6_0,3";  // modifiers: ptc_0_3
  R18_1_0_3: PTC1_0_3 => ; cell_0_3*T0_H_PTC*PTC1_0_3; R18_1_0_3 is "R18_1_0,3";
  R18_2_0_3: PTC2_0_3 => ; cell_0_3*T0_H_PTC*PTC2_0_3; R18_2_0_3 is "R18_2_0,3";
  R18_3_0_3: PTC3_0_3 => ; cell_0_3*T0_H_PTC*PTC3_0_3; R18_3_0_3 is "R18_3_0,3";
  R18_4_0_3: PTC4_0_3 => ; cell_0_3*T0_H_PTC*PTC4_0_3; R18_4_0_3 is "R18_4_0,3";
  R18_5_0_3: PTC5_0_3 => ; cell_0_3*T0_H_PTC*PTC5_0_3; R18_5_0_3 is "R18_5_0,3";
  R18_6_0_3: PTC6_0_3 => ; cell_0_3*T0_H_PTC*PTC6_0_3; R18_6_0_3 is "R18_6_0,3";
  R19_0_3: => wg_0_3; cell_0_3*transcription_inducer_repressor_pair___inducer(T0_H_wg, alpha_CIwg, CI_0_3, CN_0_3, nu_CNwg, kappa_CNwg, nu_CIwg, kappa_CIwg, alpha_WGwg, IWG_0_3, nu_WGwg, kappa_WGwg); R19_0_3 is "R19_0,3";  // modifiers: CI_0_3, CN_0_3, IWG_0_3
  R20_0_3: wg_0_3 => ; cell_0_3*T0_H_wg*wg_0_3; R20_0_3 is "R20_0,3";
  R21_0_3: => IWG_0_3; cell_0_3*translation(T0_H_IWG, wg_0_3); R21_0_3 is "R21_0,3";  // modifiers: wg_0_3
  R22_0_3: IWG_0_3 => ; cell_0_3*T0_H_IWG*IWG_0_3; R22_0_3 is "R22_0,3";
  R23_1_0_3: IWG_0_3 => EWG1_0_3; cell_0_3*T0_r_ExoWG_6*IWG_0_3; R23_1_0_3 is "R23_1_0,3";
  R23_2_0_3: IWG_0_3 => EWG2_0_3; cell_0_3*T0_r_ExoWG_6*IWG_0_3; R23_2_0_3 is "R23_2_0,3";
  R23_3_0_3: IWG_0_3 => EWG3_0_3; cell_0_3*T0_r_ExoWG_6*IWG_0_3; R23_3_0_3 is "R23_3_0,3";
  R23_4_0_3: IWG_0_3 => EWG4_0_3; cell_0_3*T0_r_ExoWG_6*IWG_0_3; R23_4_0_3 is "R23_4_0,3";
  R23_5_0_3: IWG_0_3 => EWG5_0_3; cell_0_3*T0_r_ExoWG_6*IWG_0_3; R23_5_0_3 is "R23_5_0,3";
  R23_6_0_3: IWG_0_3 => EWG6_0_3; cell_0_3*T0_r_ExoWG_6*IWG_0_3; R23_6_0_3 is "R23_6_0,3";
  R24_1_0_3: EWG1_0_3 => IWG_0_3; cell_0_3*T0_r_EndoWG*EWG1_0_3; R24_1_0_3 is "R24_1_0,3";
  R24_2_0_3: EWG2_0_3 => IWG_0_3; cell_0_3*T0_r_EndoWG*EWG2_0_3; R24_2_0_3 is "R24_2_0,3";
  R24_3_0_3: EWG3_0_3 => IWG_0_3; cell_0_3*T0_r_EndoWG*EWG3_0_3; R24_3_0_3 is "R24_3_0,3";
  R24_4_0_3: EWG4_0_3 => IWG_0_3; cell_0_3*T0_r_EndoWG*EWG4_0_3; R24_4_0_3 is "R24_4_0,3";
  R24_5_0_3: EWG5_0_3 => IWG_0_3; cell_0_3*T0_r_EndoWG*EWG5_0_3; R24_5_0_3 is "R24_5_0,3";
  R24_6_0_3: EWG6_0_3 => IWG_0_3; cell_0_3*T0_r_EndoWG*EWG6_0_3; R24_6_0_3 is "R24_6_0,3";
  R25_1_0_3: EWG1_0_3 => ; cell_0_3*T0_H_EWG*EWG1_0_3; R25_1_0_3 is "R25_1_0,3";
  R25_2_0_3: EWG2_0_3 => ; cell_0_3*T0_H_EWG*EWG2_0_3; R25_2_0_3 is "R25_2_0,3";
  R25_3_0_3: EWG3_0_3 => ; cell_0_3*T0_H_EWG*EWG3_0_3; R25_3_0_3 is "R25_3_0,3";
  R25_4_0_3: EWG4_0_3 => ; cell_0_3*T0_H_EWG*EWG4_0_3; R25_4_0_3 is "R25_4_0,3";
  R25_5_0_3: EWG5_0_3 => ; cell_0_3*T0_H_EWG*EWG5_0_3; R25_5_0_3 is "R25_5_0,3";
  R25_6_0_3: EWG6_0_3 => ; cell_0_3*T0_H_EWG*EWG6_0_3; R25_6_0_3 is "R25_6_0,3";
  R26_16_0_3: EWG1_0_3 => EWG6_0_3; cell_0_3*T0_r_LMxferWG*EWG1_0_3; R26_16_0_3 is "R26_16_0,3";
  R26_61_0_3: EWG6_0_3 => EWG1_0_3; cell_0_3*T0_r_LMxferWG*EWG6_0_3; R26_61_0_3 is "R26_61_0,3";
  R26_12_0_3: EWG1_0_3 => EWG2_0_3; cell_0_3*T0_r_LMxferWG*EWG1_0_3; R26_12_0_3 is "R26_12_0,3";
  R26_21_0_3: EWG2_0_3 => EWG1_0_3; cell_0_3*T0_r_LMxferWG*EWG2_0_3; R26_21_0_3 is "R26_21_0,3";
  R26_23_0_3: EWG2_0_3 => EWG3_0_3; cell_0_3*T0_r_LMxferWG*EWG2_0_3; R26_23_0_3 is "R26_23_0,3";
  R26_32_0_3: EWG3_0_3 => EWG2_0_3; cell_0_3*T0_r_LMxferWG*EWG3_0_3; R26_32_0_3 is "R26_32_0,3";
  R26_34_0_3: EWG3_0_3 => EWG4_0_3; cell_0_3*T0_r_LMxferWG*EWG3_0_3; R26_34_0_3 is "R26_34_0,3";
  R26_43_0_3: EWG4_0_3 => EWG3_0_3; cell_0_3*T0_r_LMxferWG*EWG4_0_3; R26_43_0_3 is "R26_43_0,3";
  R26_45_0_3: EWG4_0_3 => EWG5_0_3; cell_0_3*T0_r_LMxferWG*EWG4_0_3; R26_45_0_3 is "R26_45_0,3";
  R26_54_0_3: EWG5_0_3 => EWG4_0_3; cell_0_3*T0_r_LMxferWG*EWG5_0_3; R26_54_0_3 is "R26_54_0,3";
  R26_56_0_3: EWG5_0_3 => EWG6_0_3; cell_0_3*T0_r_LMxferWG*EWG5_0_3; R26_56_0_3 is "R26_56_0,3";
  R26_65_0_3: EWG6_0_3 => EWG5_0_3; cell_0_3*T0_r_LMxferWG*EWG6_0_3; R26_65_0_3 is "R26_65_0,3";
  R27_16_0_3: PTC1_0_3 => PTC6_0_3; cell_0_3*T0_r_LMxferWG*PTC1_0_3; R27_16_0_3 is "R27_16_0,3";
  R27_61_0_3: PTC6_0_3 => PTC1_0_3; cell_0_3*T0_r_LMxferWG*PTC6_0_3; R27_61_0_3 is "R27_61_0,3";
  R27_12_0_3: PTC1_0_3 => PTC2_0_3; cell_0_3*T0_r_LMxferWG*PTC1_0_3; R27_12_0_3 is "R27_12_0,3";
  R27_21_0_3: PTC2_0_3 => PTC1_0_3; cell_0_3*T0_r_LMxferWG*PTC2_0_3; R27_21_0_3 is "R27_21_0,3";
  R27_23_0_3: PTC2_0_3 => PTC3_0_3; cell_0_3*T0_r_LMxferWG*PTC2_0_3; R27_23_0_3 is "R27_23_0,3";
  R27_32_0_3: PTC3_0_3 => PTC2_0_3; cell_0_3*T0_r_LMxferWG*PTC3_0_3; R27_32_0_3 is "R27_32_0,3";
  R27_34_0_3: PTC3_0_3 => PTC4_0_3; cell_0_3*T0_r_LMxferWG*PTC3_0_3; R27_34_0_3 is "R27_34_0,3";
  R27_43_0_3: PTC4_0_3 => PTC3_0_3; cell_0_3*T0_r_LMxferWG*PTC4_0_3; R27_43_0_3 is "R27_43_0,3";
  R27_45_0_3: PTC4_0_3 => PTC5_0_3; cell_0_3*T0_r_LMxferWG*PTC4_0_3; R27_45_0_3 is "R27_45_0,3";
  R27_54_0_3: PTC5_0_3 => PTC4_0_3; cell_0_3*T0_r_LMxferWG*PTC5_0_3; R27_54_0_3 is "R27_54_0,3";
  R27_56_0_3: PTC5_0_3 => PTC6_0_3; cell_0_3*T0_r_LMxferWG*PTC5_0_3; R27_56_0_3 is "R27_56_0,3";
  R27_65_0_3: PTC6_0_3 => PTC5_0_3; cell_0_3*T0_r_LMxferWG*PTC6_0_3; R27_65_0_3 is "R27_65_0,3";
  R28_16_0_3: HH1_0_3 => HH6_0_3; cell_0_3*T0_r_LMxferHH*HH1_0_3; R28_16_0_3 is "R28_16_0,3";
  R28_61_0_3: HH6_0_3 => HH1_0_3; cell_0_3*T0_r_LMxferHH*HH6_0_3; R28_61_0_3 is "R28_61_0,3";
  R28_12_0_3: HH1_0_3 => HH2_0_3; cell_0_3*T0_r_LMxferHH*HH1_0_3; R28_12_0_3 is "R28_12_0,3";
  R28_21_0_3: HH2_0_3 => HH1_0_3; cell_0_3*T0_r_LMxferHH*HH2_0_3; R28_21_0_3 is "R28_21_0,3";
  R28_23_0_3: HH2_0_3 => HH3_0_3; cell_0_3*T0_r_LMxferHH*HH2_0_3; R28_23_0_3 is "R28_23_0,3";
  R28_32_0_3: HH3_0_3 => HH2_0_3; cell_0_3*T0_r_LMxferHH*HH3_0_3; R28_32_0_3 is "R28_32_0,3";
  R28_34_0_3: HH3_0_3 => HH4_0_3; cell_0_3*T0_r_LMxferHH*HH3_0_3; R28_34_0_3 is "R28_34_0,3";
  R28_43_0_3: HH4_0_3 => HH3_0_3; cell_0_3*T0_r_LMxferHH*HH4_0_3; R28_43_0_3 is "R28_43_0,3";
  R28_45_0_3: HH4_0_3 => HH5_0_3; cell_0_3*T0_r_LMxferHH*HH4_0_3; R28_45_0_3 is "R28_45_0,3";
  R28_54_0_3: HH5_0_3 => HH4_0_3; cell_0_3*T0_r_LMxferHH*HH5_0_3; R28_54_0_3 is "R28_54_0,3";
  R28_56_0_3: HH5_0_3 => HH6_0_3; cell_0_3*T0_r_LMxferHH*HH5_0_3; R28_56_0_3 is "R28_56_0,3";
  R28_65_0_3: HH6_0_3 => HH5_0_3; cell_0_3*T0_r_LMxferHH*HH6_0_3; R28_65_0_3 is "R28_65_0,3";
  R29_1_0_3: PH1_0_3 => ; cell_0_3*T0_H_PH*PH1_0_3; R29_1_0_3 is "R29_1_0,3";
  R29_2_0_3: PH2_0_3 => ; cell_0_3*T0_H_PH*PH2_0_3; R29_2_0_3 is "R29_2_0,3";
  R29_3_0_3: PH3_0_3 => ; cell_0_3*T0_H_PH*PH3_0_3; R29_3_0_3 is "R29_3_0,3";
  R29_4_0_3: PH4_0_3 => ; cell_0_3*T0_H_PH*PH4_0_3; R29_4_0_3 is "R29_4_0,3";
  R29_5_0_3: PH5_0_3 => ; cell_0_3*T0_H_PH*PH5_0_3; R29_5_0_3 is "R29_5_0,3";
  R29_6_0_3: PH6_0_3 => ; cell_0_3*T0_H_PH*PH6_0_3; R29_6_0_3 is "R29_6_0,3";
  R30a_1_0_0: PTC1_0_0 => PH1_0_0; cell_0_0*Pseudo_bi_molecular_reaction_with_transport(T0_kappa_PTCHH_HH_0, cell_0_0, PTC1_0_0, cell_0_0, HH4_0_0); R30a_1_0_0 is "R30a_1_0,0";  // modifiers: HH4_0_0
  R30b_1_0_0: HH4_0_0 => ; cell_0_0*Pseudo_bi_molecular_reaction_with_transport(T0_kappa_PTCHH_PTC_0, cell_0_0, HH4_0_0, cell_0_0, PTC1_0_0); R30b_1_0_0 is "R30b_1_0,0";  // modifiers: PTC1_0_0
  R31_1_0_0: EWG1_0_0 => EWG4_0_0; cell_0_0*Uni_molecular_transport(cell_0_0, T0_r_MxferWG, EWG1_0_0); R31_1_0_0 is "R31_1_0,0";
  R30a_2_0_0: PTC2_0_0 => PH2_0_0; Pseudo_bi_molecular_reaction_with_transport(T0_kappa_PTCHH_HH_0, cell_0_0, PTC2_0_0, cell_0_3, HH5_0_3); R30a_2_0_0 is "R30a_2_0,0";  // modifiers: HH5_0_3
  R30b_2_0_0: HH5_0_3 => ; Pseudo_bi_molecular_reaction_with_transport(T0_kappa_PTCHH_PTC_0, cell_0_3, HH5_0_3, cell_0_0, PTC2_0_0); R30b_2_0_0 is "R30b_2_0,0";  // modifiers: PTC2_0_0
  R31_2_0_0: EWG2_0_0 => EWG5_0_3; Uni_molecular_transport(cell_0_0, T0_r_MxferWG, EWG2_0_0); R31_2_0_0 is "R31_2_0,0";
  R30a_3_0_0: PTC3_0_0 => PH3_0_0; Pseudo_bi_molecular_reaction_with_transport(T0_kappa_PTCHH_HH_0, cell_0_0, PTC3_0_0, cell_0_3, HH6_0_3); R30a_3_0_0 is "R30a_3_0,0";  // modifiers: HH6_0_3
  R30b_3_0_0: HH6_0_3 => ; Pseudo_bi_molecular_reaction_with_transport(T0_kappa_PTCHH_PTC_0, cell_0_3, HH6_0_3, cell_0_0, PTC3_0_0); R30b_3_0_0 is "R30b_3_0,0";  // modifiers: PTC3_0_0
  R31_3_0_0: EWG3_0_0 => EWG6_0_3; Uni_molecular_transport(cell_0_0, T0_r_MxferWG, EWG3_0_0); R31_3_0_0 is "R31_3_0,0";
  R30a_4_0_0: PTC4_0_0 => PH4_0_0; cell_0_0*Pseudo_bi_molecular_reaction_with_transport(T0_kappa_PTCHH_HH_0, cell_0_0, PTC4_0_0, cell_0_0, HH1_0_0); R30a_4_0_0 is "R30a_4_0,0";  // modifiers: HH1_0_0
  R30b_4_0_0: HH1_0_0 => ; cell_0_0*Pseudo_bi_molecular_reaction_with_transport(T0_kappa_PTCHH_PTC_0, cell_0_0, HH1_0_0, cell_0_0, PTC4_0_0); R30b_4_0_0 is "R30b_4_0,0";  // modifiers: PTC4_0_0
  R31_4_0_0: EWG4_0_0 => EWG1_0_0; cell_0_0*Uni_molecular_transport(cell_0_0, T0_r_MxferWG, EWG4_0_0); R31_4_0_0 is "R31_4_0,0";
  R30a_5_0_0: PTC5_0_0 => PH5_0_0; Pseudo_bi_molecular_reaction_with_transport(T0_kappa_PTCHH_HH_0, cell_0_0, PTC5_0_0, cell_0_1, HH2_0_1); R30a_5_0_0 is "R30a_5_0,0";  // modifiers: HH2_0_1
  R30b_5_0_0: HH2_0_1 => ; Pseudo_bi_molecular_reaction_with_transport(T0_kappa_PTCHH_PTC_0, cell_0_1, HH2_0_1, cell_0_0, PTC5_0_0); R30b_5_0_0 is "R30b_5_0,0";  // modifiers: PTC5_0_0
  R31_5_0_0: EWG5_0_0 => EWG2_0_1; Uni_molecular_transport(cell_0_0, T0_r_MxferWG, EWG5_0_0); R31_5_0_0 is "R31_5_0,0";
  R30a_6_0_0: PTC6_0_0 => PH6_0_0; Pseudo_bi_molecular_reaction_with_transport(T0_kappa_PTCHH_HH_0, cell_0_0, PTC6_0_0, cell_0_1, HH3_0_1); R30a_6_0_0 is "R30a_6_0,0";  // modifiers: HH3_0_1
  R30b_6_0_0: HH3_0_1 => ; Pseudo_bi_molecular_reaction_with_transport(T0_kappa_PTCHH_PTC_0, cell_0_1, HH3_0_1, cell_0_0, PTC6_0_0); R30b_6_0_0 is "R30b_6_0,0";  // modifiers: PTC6_0_0
  R31_6_0_0: EWG6_0_0 => EWG3_0_1; Uni_molecular_transport(cell_0_0, T0_r_MxferWG, EWG6_0_0); R31_6_0_0 is "R31_6_0,0";
  R30a_1_0_1: PTC1_0_1 => PH1_0_1; cell_0_1*Pseudo_bi_molecular_reaction_with_transport(T0_kappa_PTCHH_HH_0, cell_0_1, PTC1_0_1, cell_0_1, HH4_0_1); R30a_1_0_1 is "R30a_1_0,1";  // modifiers: HH4_0_1
  R30b_1_0_1: HH4_0_1 => ; cell_0_1*Pseudo_bi_molecular_reaction_with_transport(T0_kappa_PTCHH_PTC_0, cell_0_1, HH4_0_1, cell_0_1, PTC1_0_1); R30b_1_0_1 is "R30b_1_0,1";  // modifiers: PTC1_0_1
  R31_1_0_1: EWG1_0_1 => EWG4_0_1; cell_0_1*Uni_molecular_transport(cell_0_1, T0_r_MxferWG, EWG1_0_1); R31_1_0_1 is "R31_1_0,1";
  R30a_2_0_1: PTC2_0_1 => PH2_0_1; Pseudo_bi_molecular_reaction_with_transport(T0_kappa_PTCHH_HH_0, cell_0_1, PTC2_0_1, cell_0_0, HH5_0_0); R30a_2_0_1 is "R30a_2_0,1";  // modifiers: HH5_0_0
  R30b_2_0_1: HH5_0_0 => ; Pseudo_bi_molecular_reaction_with_transport(T0_kappa_PTCHH_PTC_0, cell_0_0, HH5_0_0, cell_0_1, PTC2_0_1); R30b_2_0_1 is "R30b_2_0,1";  // modifiers: PTC2_0_1
  R31_2_0_1: EWG2_0_1 => EWG5_0_0; Uni_molecular_transport(cell_0_1, T0_r_MxferWG, EWG2_0_1); R31_2_0_1 is "R31_2_0,1";
  R30a_3_0_1: PTC3_0_1 => PH3_0_1; Pseudo_bi_molecular_reaction_with_transport(T0_kappa_PTCHH_HH_0, cell_0_1, PTC3_0_1, cell_0_0, HH6_0_0); R30a_3_0_1 is "R30a_3_0,1";  // modifiers: HH6_0_0
  R30b_3_0_1: HH6_0_0 => ; Pseudo_bi_molecular_reaction_with_transport(T0_kappa_PTCHH_PTC_0, cell_0_0, HH6_0_0, cell_0_1, PTC3_0_1); R30b_3_0_1 is "R30b_3_0,1";  // modifiers: PTC3_0_1
  R31_3_0_1: EWG3_0_1 => EWG6_0_0; Uni_molecular_transport(cell_0_1, T0_r_MxferWG, EWG3_0_1); R31_3_0_1 is "R31_3_0,1";
  R30a_4_0_1: PTC4_0_1 => PH4_0_1; cell_0_1*Pseudo_bi_molecular_reaction_with_transport(T0_kappa_PTCHH_HH_0, cell_0_1, PTC4_0_1, cell_0_1, HH1_0_1); R30a_4_0_1 is "R30a_4_0,1";  // modifiers: HH1_0_1
  R30b_4_0_1: HH1_0_1 => ; cell_0_1*Pseudo_bi_molecular_reaction_with_transport(T0_kappa_PTCHH_PTC_0, cell_0_1, HH1_0_1, cell_0_1, PTC4_0_1); R30b_4_0_1 is "R30b_4_0,1";  // modifiers: PTC4_0_1
  R31_4_0_1: EWG4_0_1 => EWG1_0_1; cell_0_1*Uni_molecular_transport(cell_0_1, T0_r_MxferWG, EWG4_0_1); R31_4_0_1 is "R31_4_0,1";
  R30a_5_0_1: PTC5_0_1 => PH5_0_1; Pseudo_bi_molecular_reaction_with_transport(T0_kappa_PTCHH_HH_0, cell_0_1, PTC5_0_1, cell_0_2, HH2_0_2); R30a_5_0_1 is "R30a_5_0,1";  // modifiers: HH2_0_2
  R30b_5_0_1: HH2_0_2 => ; Pseudo_bi_molecular_reaction_with_transport(T0_kappa_PTCHH_PTC_0, cell_0_2, HH2_0_2, cell_0_1, PTC5_0_1); R30b_5_0_1 is "R30b_5_0,1";  // modifiers: PTC5_0_1
  R31_5_0_1: EWG5_0_1 => EWG2_0_2; Uni_molecular_transport(cell_0_1, T0_r_MxferWG, EWG5_0_1); R31_5_0_1 is "R31_5_0,1";
  R30a_6_0_1: PTC6_0_1 => PH6_0_1; Pseudo_bi_molecular_reaction_with_transport(T0_kappa_PTCHH_HH_0, cell_0_1, PTC6_0_1, cell_0_2, HH3_0_2); R30a_6_0_1 is "R30a_6_0,1";  // modifiers: HH3_0_2
  R30b_6_0_1: HH3_0_2 => ; Pseudo_bi_molecular_reaction_with_transport(T0_kappa_PTCHH_PTC_0, cell_0_2, HH3_0_2, cell_0_1, PTC6_0_1); R30b_6_0_1 is "R30b_6_0,1";  // modifiers: PTC6_0_1
  R31_6_0_1: EWG6_0_1 => EWG3_0_2; Uni_molecular_transport(cell_0_1, T0_r_MxferWG, EWG6_0_1); R31_6_0_1 is "R31_6_0,1";
  R30a_1_0_2: PTC1_0_2 => PH1_0_2; cell_0_2*Pseudo_bi_molecular_reaction_with_transport(T0_kappa_PTCHH_HH_0, cell_0_2, PTC1_0_2, cell_0_2, HH4_0_2); R30a_1_0_2 is "R30a_1_0,2";  // modifiers: HH4_0_2
  R30b_1_0_2: HH4_0_2 => ; cell_0_2*Pseudo_bi_molecular_reaction_with_transport(T0_kappa_PTCHH_PTC_0, cell_0_2, HH4_0_2, cell_0_2, PTC1_0_2); R30b_1_0_2 is "R30b_1_0,2";  // modifiers: PTC1_0_2
  R31_1_0_2: EWG1_0_2 => EWG4_0_2; cell_0_2*Uni_molecular_transport(cell_0_2, T0_r_MxferWG, EWG1_0_2); R31_1_0_2 is "R31_1_0,2";
  R30a_2_0_2: PTC2_0_2 => PH2_0_2; Pseudo_bi_molecular_reaction_with_transport(T0_kappa_PTCHH_HH_0, cell_0_2, PTC2_0_2, cell_0_1, HH5_0_1); R30a_2_0_2 is "R30a_2_0,2";  // modifiers: HH5_0_1
  R30b_2_0_2: HH5_0_1 => ; Pseudo_bi_molecular_reaction_with_transport(T0_kappa_PTCHH_PTC_0, cell_0_1, HH5_0_1, cell_0_2, PTC2_0_2); R30b_2_0_2 is "R30b_2_0,2";  // modifiers: PTC2_0_2
  R31_2_0_2: EWG2_0_2 => EWG5_0_1; Uni_molecular_transport(cell_0_2, T0_r_MxferWG, EWG2_0_2); R31_2_0_2 is "R31_2_0,2";
  R30a_3_0_2: PTC3_0_2 => PH3_0_2; Pseudo_bi_molecular_reaction_with_transport(T0_kappa_PTCHH_HH_0, cell_0_2, PTC3_0_2, cell_0_1, HH6_0_1); R30a_3_0_2 is "R30a_3_0,2";  // modifiers: HH6_0_1
  R30b_3_0_2: HH6_0_1 => ; Pseudo_bi_molecular_reaction_with_transport(T0_kappa_PTCHH_PTC_0, cell_0_1, HH6_0_1, cell_0_2, PTC3_0_2); R30b_3_0_2 is "R30b_3_0,2";  // modifiers: PTC3_0_2
  R31_3_0_2: EWG3_0_2 => EWG6_0_1; Uni_molecular_transport(cell_0_2, T0_r_MxferWG, EWG3_0_2); R31_3_0_2 is "R31_3_0,2";
  R30a_4_0_2: PTC4_0_2 => PH4_0_2; cell_0_2*Pseudo_bi_molecular_reaction_with_transport(T0_kappa_PTCHH_HH_0, cell_0_2, PTC4_0_2, cell_0_2, HH1_0_2); R30a_4_0_2 is "R30a_4_0,2";  // modifiers: HH1_0_2
  R30b_4_0_2: HH1_0_2 => ; cell_0_2*Pseudo_bi_molecular_reaction_with_transport(T0_kappa_PTCHH_PTC_0, cell_0_2, HH1_0_2, cell_0_2, PTC4_0_2); R30b_4_0_2 is "R30b_4_0,2";  // modifiers: PTC4_0_2
  R31_4_0_2: EWG4_0_2 => EWG1_0_2; cell_0_2*Uni_molecular_transport(cell_0_2, T0_r_MxferWG, EWG4_0_2); R31_4_0_2 is "R31_4_0,2";
  R30a_5_0_2: PTC5_0_2 => PH5_0_2; Pseudo_bi_molecular_reaction_with_transport(T0_kappa_PTCHH_HH_0, cell_0_2, PTC5_0_2, cell_0_3, HH2_0_3); R30a_5_0_2 is "R30a_5_0,2";  // modifiers: HH2_0_3
  R30b_5_0_2: HH2_0_3 => ; Pseudo_bi_molecular_reaction_with_transport(T0_kappa_PTCHH_PTC_0, cell_0_3, HH2_0_3, cell_0_2, PTC5_0_2); R30b_5_0_2 is "R30b_5_0,2";  // modifiers: PTC5_0_2
  R31_5_0_2: EWG5_0_2 => EWG2_0_3; Uni_molecular_transport(cell_0_2, T0_r_MxferWG, EWG5_0_2); R31_5_0_2 is "R31_5_0,2";
  R30a_6_0_2: PTC6_0_2 => PH6_0_2; Pseudo_bi_molecular_reaction_with_transport(T0_kappa_PTCHH_HH_0, cell_0_2, PTC6_0_2, cell_0_3, HH3_0_3); R30a_6_0_2 is "R30a_6_0,2";  // modifiers: HH3_0_3
  R30b_6_0_2: HH3_0_3 => ; Pseudo_bi_molecular_reaction_with_transport(T0_kappa_PTCHH_PTC_0, cell_0_3, HH3_0_3, cell_0_2, PTC6_0_2); R30b_6_0_2 is "R30b_6_0,2";  // modifiers: PTC6_0_2
  R31_6_0_2: EWG6_0_2 => EWG3_0_3; Uni_molecular_transport(cell_0_2, T0_r_MxferWG, EWG6_0_2); R31_6_0_2 is "R31_6_0,2";
  R30a_1_0_3: PTC1_0_3 => PH1_0_3; cell_0_3*Pseudo_bi_molecular_reaction_with_transport(T0_kappa_PTCHH_HH_0, cell_0_3, PTC1_0_3, cell_0_3, HH4_0_3); R30a_1_0_3 is "R30a_1_0,3";  // modifiers: HH4_0_3
  R30b_1_0_3: HH4_0_3 => ; cell_0_3*Pseudo_bi_molecular_reaction_with_transport(T0_kappa_PTCHH_PTC_0, cell_0_3, HH4_0_3, cell_0_3, PTC1_0_3); R30b_1_0_3 is "R30b_1_0,3";  // modifiers: PTC1_0_3
  R31_1_0_3: EWG1_0_3 => EWG4_0_3; cell_0_3*Uni_molecular_transport(cell_0_3, T0_r_MxferWG, EWG1_0_3); R31_1_0_3 is "R31_1_0,3";
  R30a_2_0_3: PTC2_0_3 => PH2_0_3; Pseudo_bi_molecular_reaction_with_transport(T0_kappa_PTCHH_HH_0, cell_0_3, PTC2_0_3, cell_0_2, HH5_0_2); R30a_2_0_3 is "R30a_2_0,3";  // modifiers: HH5_0_2
  R30b_2_0_3: HH5_0_2 => ; Pseudo_bi_molecular_reaction_with_transport(T0_kappa_PTCHH_PTC_0, cell_0_2, HH5_0_2, cell_0_3, PTC2_0_3); R30b_2_0_3 is "R30b_2_0,3";  // modifiers: PTC2_0_3
  R31_2_0_3: EWG2_0_3 => EWG5_0_2; Uni_molecular_transport(cell_0_3, T0_r_MxferWG, EWG2_0_3); R31_2_0_3 is "R31_2_0,3";
  R30a_3_0_3: PTC3_0_3 => PH3_0_3; Pseudo_bi_molecular_reaction_with_transport(T0_kappa_PTCHH_HH_0, cell_0_3, PTC3_0_3, cell_0_2, HH6_0_2); R30a_3_0_3 is "R30a_3_0,3";  // modifiers: HH6_0_2
  R30b_3_0_3: HH6_0_2 => ; Pseudo_bi_molecular_reaction_with_transport(T0_kappa_PTCHH_PTC_0, cell_0_2, HH6_0_2, cell_0_3, PTC3_0_3); R30b_3_0_3 is "R30b_3_0,3";  // modifiers: PTC3_0_3
  R31_3_0_3: EWG3_0_3 => EWG6_0_2; Uni_molecular_transport(cell_0_3, T0_r_MxferWG, EWG3_0_3); R31_3_0_3 is "R31_3_0,3";
  R30a_4_0_3: PTC4_0_3 => PH4_0_3; cell_0_3*Pseudo_bi_molecular_reaction_with_transport(T0_kappa_PTCHH_HH_0, cell_0_3, PTC4_0_3, cell_0_3, HH1_0_3); R30a_4_0_3 is "R30a_4_0,3";  // modifiers: HH1_0_3
  R30b_4_0_3: HH1_0_3 => ; cell_0_3*Pseudo_bi_molecular_reaction_with_transport(T0_kappa_PTCHH_PTC_0, cell_0_3, HH1_0_3, cell_0_3, PTC4_0_3); R30b_4_0_3 is "R30b_4_0,3";  // modifiers: PTC4_0_3
  R31_4_0_3: EWG4_0_3 => EWG1_0_3; cell_0_3*Uni_molecular_transport(cell_0_3, T0_r_MxferWG, EWG4_0_3); R31_4_0_3 is "R31_4_0,3";
  R30a_5_0_3: PTC5_0_3 => PH5_0_3; Pseudo_bi_molecular_reaction_with_transport(T0_kappa_PTCHH_HH_0, cell_0_3, PTC5_0_3, cell_0_0, HH2_0_0); R30a_5_0_3 is "R30a_5_0,3";  // modifiers: HH2_0_0
  R30b_5_0_3: HH2_0_0 => ; Pseudo_bi_molecular_reaction_with_transport(T0_kappa_PTCHH_PTC_0, cell_0_0, HH2_0_0, cell_0_3, PTC5_0_3); R30b_5_0_3 is "R30b_5_0,3";  // modifiers: PTC5_0_3
  R31_5_0_3: EWG5_0_3 => EWG2_0_0; Uni_molecular_transport(cell_0_3, T0_r_MxferWG, EWG5_0_3); R31_5_0_3 is "R31_5_0,3";
  R30a_6_0_3: PTC6_0_3 => PH6_0_3; Pseudo_bi_molecular_reaction_with_transport(T0_kappa_PTCHH_HH_0, cell_0_3, PTC6_0_3, cell_0_0, HH3_0_0); R30a_6_0_3 is "R30a_6_0,3";  // modifiers: HH3_0_0
  R30b_6_0_3: HH3_0_0 => ; Pseudo_bi_molecular_reaction_with_transport(T0_kappa_PTCHH_PTC_0, cell_0_0, HH3_0_0, cell_0_3, PTC6_0_3); R30b_6_0_3 is "R30b_6_0,3";  // modifiers: PTC6_0_3
  R31_6_0_3: EWG6_0_3 => EWG3_0_0; Uni_molecular_transport(cell_0_3, T0_r_MxferWG, EWG6_0_3); R31_6_0_3 is "R31_6_0,3";

  // Unit definitions:
  unit length = dimensionless^0;
  unit area = dimensionless^0;
  unit volume = dimensionless^0;
  unit time = dimensionless^0;
  unit substance = dimensionless^0;
  unit unit_0 = dimensionless^0; unit_0 is "1";
end
