// SBML level 2 version 4

function Function_for_ATM_deactivation(ATM_active, cell, k_deactivation)
  k_deactivation*ATM_active/cell;
end

function Function_for_ATR_activation(ATR_inactive, DNA_damage, HDAC4_active, TOPBP1_active, cell, k_ATR_activation)
  k_ATR_activation*DNA_damage*TOPBP1_active*(1/(1 + HDAC4_active))*ATR_inactive/cell;
end

function Function_for_ATR_deactivation(ATR_active, cell, k_ATR_deactivation)
  k_ATR_deactivation*ATR_active/cell;
end

function Function_for_p53_activation_ATR(ATR_active, cell, k_p53_activation_ATR, p53_inactive)
  k_p53_activation_ATR*ATR_active*p53_inactive/cell;
end

function Function_for_DNA_damage_repair_ATM(ATM_active, DNA_damage, cell, k_repair)
  k_repair*ATM_active*DNA_damage/cell;
end

function Function_for_p53_activation_ATM(ATM_active, cell, k_p53_activation, p53_inactive)
  k_p53_activation*ATM_active*p53_inactive/cell;
end

function Function_for_p53_deactivation(cell, k_p53_deactivation, p53_active)
  k_p53_deactivation*p53_active/cell;
end

function Function_for_HDAC4_activation(HDAC4_inactive, PP2A, cell, k_HDAC4_activation)
  k_HDAC4_activation*PP2A*HDAC4_inactive/cell;
end

function Function_for_HDAC4_deactivation(ATM_active, HDAC4_active, cell, k_HDAC4_deactivation)
  k_HDAC4_deactivation*ATM_active*HDAC4_active/cell;
end

function Function_for_p53_deactivation_HDAC4(HDAC4_active, cell, k_HDAC4_p53, p53_active)
  k_HDAC4_p53*HDAC4_active*p53_active/cell;
end

function Function_for_I2PP2A_production(ATM_active, cell, k_I2PP2A_production)
  k_I2PP2A_production*ATM_active/cell;
end

function Function_for_I2PP2A_degradation(I2PP2A, cell, k_I2PP2A_degradation)
  k_I2PP2A_degradation*I2PP2A/cell;
end

function Function_for_PP2A_binding(I2PP2A, PP2A, cell, k_binding)
  k_binding*PP2A*I2PP2A/cell;
end

function Function_for_PP2A_unbinding(PP2A_I2PP2A, cell, k_unbinding)
  k_unbinding*PP2A_I2PP2A/cell;
end

function Function_for_TOPBP1_activation(DNA_damage, TOPBP1_inactive, cell, k_TOPBP1_activation)
  k_TOPBP1_activation*DNA_damage*TOPBP1_inactive/cell;
end

function Function_for_TOPBP1_deactivation(TOPBP1_active, cell, k_TOPBP1_deactivation)
  k_TOPBP1_deactivation*TOPBP1_active/cell;
end

function Function_for_DNA_damage_repair_ATR(ATR_active, CHK1_active, DNA_damage, cell, k_repair_ATR)
  k_repair_ATR*ATR_active*DNA_damage*(1 + CHK1_active)/cell;
end

function Function_for_CK2_phosphorylation_HDAC4(CK2, HDAC4_active, cell, k_CK2)
  k_CK2*CK2*HDAC4_active/cell;
end

function Function_for_HDAC4_dephosphorylation(HDAC4_phospho, cell, k_dephos)
  k_dephos*HDAC4_phospho/cell;
end

function Function_for_CK2_TOPBP1_activation(Spermidine, TOPBP1_inactive, alpha_spermidine, cell, k_CK2_TOPBP1)
  k_CK2_TOPBP1*(1 + alpha_spermidine*Spermidine)*TOPBP1_inactive/cell;
end

function Function_for_CHK1_activation(ATR_active, CHK1_inactive, cell, k_CHK1_activation)
  k_CHK1_activation*ATR_active*CHK1_inactive/cell;
end

function Function_for_CHK1_deactivation(CHK1_active, cell, k_CHK1_deactivation)
  k_CHK1_deactivation*CHK1_active/cell;
end

function Function_for_CHK2_activation(ATM_active, CHK2_inactive, cell, k_CHK2_activation)
  k_CHK2_activation*ATM_active*CHK2_inactive/cell;
end

function Function_for_CHK2_deactivation(CHK2_active, cell, k_CHK2_deactivation)
  k_CHK2_deactivation*CHK2_active/cell;
end

function Function_for_p53_activation_CHK2(CHK2_active, cell, k_p53_activation_CHK2, p53_inactive)
  k_p53_activation_CHK2*CHK2_active*p53_inactive/cell;
end

function Function_for_NRF2_activation(DNA_damage, NRF2_inactive, cell, k_NRF2_activation)
  k_NRF2_activation*DNA_damage*NRF2_inactive/cell;
end

function Function_for_NRF2_deactivation(NRF2_active, cell, k_NRF2_deactivation)
  k_NRF2_deactivation*NRF2_active/cell;
end

function Function_for_NRF2_DNA_repair(DNA_damage, NRF2_active, cell, k_NRF2_repair)
  k_NRF2_repair*NRF2_active*DNA_damage/cell;
end

function Function_for_NRF2_degradation_KEAP1(KEAP1, K_omav, NRF2_inactive, Omaveloxolone, cell, k_NRF2_KEAP1)
  k_NRF2_KEAP1*(1/(1 + Omaveloxolone/K_omav))*KEAP1*NRF2_inactive/cell;
end

function Function_for_Autophagy_activation(Autophagy_inactive, Spermidine, cell, k_spermidine_activation)
  k_spermidine_activation*Spermidine*Autophagy_inactive/cell;
end

function Function_for_Autophagy_deactivation(Autophagy_active, cell, k_autophagy_deactivation)
  k_autophagy_deactivation*Autophagy_active/cell;
end

function Function_for_Autophagy_DNA_repair(Autophagy_active, DNA_damage, Km_autophagy, cell, k_autophagy_repair)
  k_autophagy_repair*Autophagy_active*DNA_damage/(Km_autophagy + DNA_damage)/cell;
end

function Function_for_DNA_damage_production(cell, k_damage_production)
  k_damage_production/cell;
end

function Function_for_p21_production(cell, k_p21, p53_active)
  k_p21*p53_active/cell;
end

function Function_for_p21_degradation(cell, k_p21_deg, p21)
  k_p21_deg*p21/cell;
end

function Function_for_BAX_production(cell, k_BAX, p53_active)
  k_BAX*p53_active/cell;
end

function Function_for_BAX_degradation(BAX, cell, k_BAX_deg)
  k_BAX_deg*BAX/cell;
end

function Function_for_PUMA_production(cell, k_PUMA, p53_active)
  k_PUMA*p53_active/cell;
end

function Function_for_PUMA_degradation(PUMA, cell, k_PUMA_deg)
  k_PUMA_deg*PUMA/cell;
end

function Function_for_ATM_activation(ATM_inactive, DNA_damage, TOPBP1_active, cell, k_activation)
  k_activation*DNA_damage*(1 + TOPBP1_active)*ATM_inactive/cell;
end

model Integrated_Model_of_DNA_Damage_Response_and_p53_Signaling_in_ATM_ATR_Deficient_Ataxia_Telangiectasia__Exploring_the_Therapeutic_Roles_of_Possible_repurposed_drugs()
  // Integrated Model of DNA Damage Response and p53 Signaling in ATM/ATR-Deficient Ataxia Telangiectasia: Exploring the Therapeutic Roles of Possible repurposed drugs
  // Comprehensive Model Description
  // Overview
  // This model simulates the cellular response to DNA damage under conditions of ATM/ATR deficiency—such as in ataxia telangiectasia—and predicts the potential benefits of drug repositioning with Omaveloxolone and spermidine. It integrates several interconnected modules: DNA damage production and repair, ATM/ATR–p53 signaling, NRF2/KEAP1 regulation, spermidine-induced autophagy (with additional positive modulation of ATR signaling), and downstream p53 effectors involved in cell fate decisions.
  // 1. DNA Damage Production and Repair Module
  // Basal DNA Damage Production:
  // DNA damage is continuously generated at a constant rate, representing both endogenous processes and low-level environmental stress. This reaction acts as a source term for the DNA_damage species.
  // Repair Pathways:
  // Several mechanisms work to reduce DNA damage:
  // ATM-Mediated Repair: Active ATM facilitates the direct repair of DNA damage.
  // ATR-Mediated Repair: Active ATR, in cooperation with CHK1, repairs DNA damage.
  // NRF2-Mediated Repair: Active NRF2 triggers antioxidant responses that reduce DNA damage.
  // Autophagy-Mediated Repair: The autophagy pathway, induced by spermidine, repairs DNA damage in a saturable manner (modeled using Michaelis–Menten kinetics). This ensures that even a significant pulse of damage is only partially repaired, leaving a nonzero steady-state level.
  // 2. ATM/ATR–p53 Signaling Module
  // ATM and ATR Activation:
  // DNA damage, along with a positive input from TOPBP1, converts inactive ATM and ATR to their active forms. Under ATM/ATR-deficient conditions (as in ataxia telangiectasia), the activation is severely reduced, resulting in higher levels of unrepaired DNA damage.
  // p53 Activation:
  // Both ATM_active and ATR_active phosphorylate and activate p53. Active p53 then acts as a central integrator of the DNA damage signal.
  // Regulatory Proteins:
  // HDAC4:
  // HDAC4 cycles between inactive and active states. Its active form can attenuate p53 activity.
  // TOPBP1:
  // TOPBP1 is activated in a DNA damage–dependent manner and helps promote ATR activation.
  // CK2:
  // CK2 is a constitutively active kinase that supports TOPBP1 activation.
  // 3. NRF2/KEAP1 Module and Omaveloxolone
  // NRF2 Activation:
  // DNA damage stimulates the conversion of NRF2_inactive to NRF2_active. Active NRF2 enhances antioxidant defenses and promotes DNA repair.
  // KEAP1-Mediated Degradation:
  // Under normal conditions, KEAP1 targets NRF2_inactive for degradation, keeping NRF2 activity low.
  // Modulation by Omaveloxolone:
  // Omaveloxolone is modeled as a constant (boundary) species. It inhibits KEAP1’s activity, thereby reducing NRF2 degradation. This shifts the balance in favor of increased NRF2_active, which boosts the cell’s antioxidant and repair responses.
  // 4. Spermidine-Induced Autophagy and Positive Modulation of ATR Signaling
  // Spermidine is modeled as a constant species and has two major effects:
  // Induction of Autophagy:
  // Spermidine promotes the conversion of Autophagy_inactive to Autophagy_active. The active autophagy machinery repairs DNA damage using a saturable (Michaelis–Menten) mechanism. This pathway helps clear DNA damage but is limited by its maximum capacity.
  // Enhancement of ATR Signaling:
  // Spermidine also positively modulates ATR signaling by enhancing the CK2-mediated activation of TOPBP1. In the model, the effective rate of TOPBP1 activation is increased proportionally to the concentration of spermidine. This is represented by a modulation factor, where the effective rate constant for TOPBP1 activation is multiplied by a term that increases with spermidine concentration. The boosted TOPBP1_active level in turn enhances ATR activation, partially compensating for the loss of ATM/ATR function.
  // 5. Downstream p53 Targets: Cell Fate Decisions
  // Activated p53 regulates cell fate by inducing the production of several downstream effectors:
  // p21:
  // p21 is produced in response to p53 activation and is associated with cell cycle arrest and senescence. Its production is balanced by a degradation reaction.
  // BAX and PUMA:
  // Both BAX and PUMA are pro-apoptotic proteins. They are produced in proportion to p53_active and are subsequently degraded. Their relative levels help determine whether the cell will undergo apoptosis.
  // 6. Reaction Kinetics (Qualitative Overview)
  // Mass-Action and Michaelis–Menten Kinetics:
  // Most reactions in the model are governed by mass-action kinetics. For example, activation and deactivation reactions (such as ATM activation by DNA damage or p53 activation by ATM/ATR) follow simple proportional relationships.
  // Saturable Repair Processes:
  // The autophagy-mediated DNA repair reaction uses Michaelis–Menten kinetics to reflect a saturation effect; when DNA damage is high, the repair rate approaches a maximum value, ensuring that not all damage is cleared immediately.
  // Modulatory Effects:
  // Spermidine increases the effective rate of TOPBP1 activation (and hence ATR activation) via a modulation term that is proportional to its concentration. Omaveloxolone reduces the degradation rate of NRF2 by inhibiting KEAP1.
  // Biological Implications and Model Utility
  // ATM/ATR Deficiency:
  // In ataxia telangiectasia, ATM/ATR functions are diminished, leading to increased DNA damage. The model simulates this scenario and examines how alternative pathways (NRF2-mediated repair, autophagy, and enhanced ATR signaling via spermidine) help mitigate the damage.
  // Drug Repositioning Predictions:
  // The model can be used to predict the outcomes of repositioning drugs:
  // Omaveloxolone is expected to stabilize NRF2, enhancing antioxidant defenses and reducing DNA damage.
  // Spermidine acts dually by promoting autophagy (with a saturable repair capacity) and by boosting ATR signaling via TOPBP1 activation.
  // Cell Fate Outcomes:
  // The downstream p53 targets (p21, BAX, and PUMA) serve as markers for cell cycle arrest/senescence and apoptosis. By simulating the dynamics of these proteins, the model can predict whether a cell is likely to survive, arrest its cycle, or undergo apoptosis based on the integrated response to DNA damage and drug interventions.
  // Conclusion
  // This detailed and comprehensive model integrates multiple layers of the cellular response to DNA damage in ATM/ATR-deficient conditions. It includes upstream damage sensing, multiple repair pathways (including direct kinase-mediated repair, antioxidant responses via NRF2, and autophagy-mediated repair), and downstream effectors that determine cell fate. Omaveloxolone and spermidine are modeled to specifically modulate the NRF2/KEAP1 pathway and ATR signaling (via TOPBP1 activation), respectively. This framework provides a robust platform for exploring drug repositioning strategies and predicting cellular outcomes in diseases such as ataxia telangiectasia.
  // biomodels.db:MODEL2503190002
  // hasProperty mamo:MAMO_0000045
  // isDescribedBy doi:10.1038/s41540-025-00629-4

  // Compartments:
  compartment cell = 1; cell is "Cell";

  // Species:
  species ATM_inactive in cell = 100;
  species ATM_active in cell = 0;
  species ATR_inactive in cell = 100;
  species ATR_active in cell = 0;
  species DNA_damage in cell = 1;
  species p53_inactive in cell = 50;
  species p53_active in cell = 0;
  species HDAC4_inactive in cell = 10000;
  species HDAC4_active in cell = 0;
  species HDAC4_phospho in cell = 0;
  species PP2A in cell = 50;
  species I2PP2A in cell = 0;
  species PP2A_I2PP2A in cell = 0;
  species TOPBP1_inactive in cell = 100;
  species TOPBP1_active in cell = 0;
  species $CK2 in cell = 50;
  species CHK1_inactive in cell = 100;
  species CHK1_active in cell = 0;
  species CHK2_inactive in cell = 100;
  species CHK2_active in cell = 0;
  species NRF2_inactive in cell = 100;
  species NRF2_active in cell = 0;
  species $KEAP1 in cell = 100;
  species NRF2_degraded in cell = 0;
  species $Omaveloxolone in cell = 0;
  species $Spermidine in cell = 0;
  species Autophagy_inactive in cell = 100;
  species Autophagy_active in cell = 0;
  species p21 in cell = 0;
  species BAX in cell = 0;
  species PUMA in cell = 0;

  // Parameters:
  k_activation = 0.01;
  k_deactivation = 0.1;
  k_repair = 0.05;
  k_damage_production = 0.1;
  k_p53_activation = 0.02;
  k_p53_deactivation = 0.1;
  k_HDAC4_activation = 0.02;
  k_HDAC4_deactivation = 0.05;
  k_HDAC4_p53 = 0.03;
  k_I2PP2A_production = 0.005;
  k_I2PP2A_degradation = 0.01;
  k_binding = 0.1;
  k_unbinding = 0.01;
  k_TOPBP1_activation = 0.02;
  k_TOPBP1_deactivation = 0.1;
  k_ATR_activation = 0.02;
  k_ATR_deactivation = 0.1;
  k_p53_activation_ATR = 0.015;
  k_repair_ATR = 5e-7;
  k_CK2 = 0.02;
  k_dephos = 0.05;
  k_CK2_TOPBP1 = 0.02;
  alpha_spermidine = 0.5;
  k_CHK1_activation = 0.02;
  k_CHK1_deactivation = 0.1;
  k_CHK2_activation = 0.02;
  k_CHK2_deactivation = 0.1;
  k_p53_activation_CHK2 = 0.02;
  k_NRF2_activation = 0.01;
  k_NRF2_deactivation = 0.05;
  k_NRF2_repair = 0.02;
  k_NRF2_KEAP1 = 0.01;
  K_omav = 1;
  k_spermidine_activation = 0.05;
  k_autophagy_deactivation = 0.05;
  k_autophagy_repair = 0.001;
  Km_autophagy = 10;
  k_p21 = 0.09;
  k_p21_deg = 0.01;
  k_BAX = 0.05;
  k_BAX_deg = 0.01;
  k_PUMA = 0.03;
  k_PUMA_deg = 0.01;

  // Reactions:
  ATM_activation: ATM_inactive => ATM_active; cell*Function_for_ATM_activation(ATM_inactive, DNA_damage, TOPBP1_active, cell, k_activation);  // modifiers: DNA_damage, TOPBP1_active
  ATM_deactivation: ATM_active => ATM_inactive; cell*Function_for_ATM_deactivation(ATM_active, cell, k_deactivation);
  DNA_damage_repair_ATM: DNA_damage => ; cell*Function_for_DNA_damage_repair_ATM(ATM_active, DNA_damage, cell, k_repair);  // modifiers: ATM_active
  p53_activation_ATM: p53_inactive => p53_active; cell*Function_for_p53_activation_ATM(ATM_active, cell, k_p53_activation, p53_inactive);  // modifiers: ATM_active
  p53_deactivation: p53_active => p53_inactive; cell*Function_for_p53_deactivation(cell, k_p53_deactivation, p53_active);
  HDAC4_activation: HDAC4_inactive => HDAC4_active; cell*Function_for_HDAC4_activation(HDAC4_inactive, PP2A, cell, k_HDAC4_activation);  // modifiers: PP2A
  HDAC4_deactivation: HDAC4_active => HDAC4_inactive; cell*Function_for_HDAC4_deactivation(ATM_active, HDAC4_active, cell, k_HDAC4_deactivation);  // modifiers: ATM_active
  p53_deactivation_HDAC4: p53_active => p53_inactive; cell*Function_for_p53_deactivation_HDAC4(HDAC4_active, cell, k_HDAC4_p53, p53_active);  // modifiers: HDAC4_active
  I2PP2A_production: => I2PP2A; cell*Function_for_I2PP2A_production(ATM_active, cell, k_I2PP2A_production);  // modifiers: ATM_active
  I2PP2A_degradation: I2PP2A => ; cell*Function_for_I2PP2A_degradation(I2PP2A, cell, k_I2PP2A_degradation);
  PP2A_binding: PP2A + I2PP2A => PP2A_I2PP2A; cell*Function_for_PP2A_binding(I2PP2A, PP2A, cell, k_binding);
  PP2A_unbinding: PP2A_I2PP2A => PP2A + I2PP2A; cell*Function_for_PP2A_unbinding(PP2A_I2PP2A, cell, k_unbinding);
  TOPBP1_activation: TOPBP1_inactive => TOPBP1_active; cell*Function_for_TOPBP1_activation(DNA_damage, TOPBP1_inactive, cell, k_TOPBP1_activation);  // modifiers: DNA_damage
  TOPBP1_deactivation: TOPBP1_active => TOPBP1_inactive; cell*Function_for_TOPBP1_deactivation(TOPBP1_active, cell, k_TOPBP1_deactivation);
  ATR_activation: ATR_inactive => ATR_active; cell*Function_for_ATR_activation(ATR_inactive, DNA_damage, HDAC4_active, TOPBP1_active, cell, k_ATR_activation);  // modifiers: DNA_damage, TOPBP1_active, HDAC4_active
  ATR_deactivation: ATR_active => ATR_inactive; cell*Function_for_ATR_deactivation(ATR_active, cell, k_ATR_deactivation);
  p53_activation_ATR: p53_inactive => p53_active; cell*Function_for_p53_activation_ATR(ATR_active, cell, k_p53_activation_ATR, p53_inactive);  // modifiers: ATR_active
  DNA_damage_repair_ATR: DNA_damage => ; cell*Function_for_DNA_damage_repair_ATR(ATR_active, CHK1_active, DNA_damage, cell, k_repair_ATR);  // modifiers: ATR_active, CHK1_active
  CK2_phosphorylation_HDAC4: HDAC4_active => HDAC4_phospho; cell*Function_for_CK2_phosphorylation_HDAC4(CK2, HDAC4_active, cell, k_CK2);  // modifiers: CK2
  HDAC4_dephosphorylation: HDAC4_phospho => HDAC4_inactive; cell*Function_for_HDAC4_dephosphorylation(HDAC4_phospho, cell, k_dephos);
  CK2_TOPBP1_activation: TOPBP1_inactive => TOPBP1_active; cell*Function_for_CK2_TOPBP1_activation(Spermidine, TOPBP1_inactive, alpha_spermidine, cell, k_CK2_TOPBP1);  // modifiers: CK2, Spermidine
  CHK1_activation: CHK1_inactive => CHK1_active; cell*Function_for_CHK1_activation(ATR_active, CHK1_inactive, cell, k_CHK1_activation);  // modifiers: ATR_active
  CHK1_deactivation: CHK1_active => CHK1_inactive; cell*Function_for_CHK1_deactivation(CHK1_active, cell, k_CHK1_deactivation);
  CHK2_activation: CHK2_inactive => CHK2_active; cell*Function_for_CHK2_activation(ATM_active, CHK2_inactive, cell, k_CHK2_activation);  // modifiers: ATM_active
  CHK2_deactivation: CHK2_active => CHK2_inactive; cell*Function_for_CHK2_deactivation(CHK2_active, cell, k_CHK2_deactivation);
  p53_activation_CHK2: p53_inactive => p53_active; cell*Function_for_p53_activation_CHK2(CHK2_active, cell, k_p53_activation_CHK2, p53_inactive);  // modifiers: CHK2_active
  NRF2_activation: NRF2_inactive => NRF2_active; cell*Function_for_NRF2_activation(DNA_damage, NRF2_inactive, cell, k_NRF2_activation);  // modifiers: DNA_damage
  NRF2_deactivation: NRF2_active => NRF2_inactive; cell*Function_for_NRF2_deactivation(NRF2_active, cell, k_NRF2_deactivation);
  NRF2_DNA_repair: DNA_damage => ; cell*Function_for_NRF2_DNA_repair(DNA_damage, NRF2_active, cell, k_NRF2_repair);  // modifiers: NRF2_active
  NRF2_degradation_KEAP1: NRF2_inactive => NRF2_degraded; cell*Function_for_NRF2_degradation_KEAP1(KEAP1, K_omav, NRF2_inactive, Omaveloxolone, cell, k_NRF2_KEAP1);  // modifiers: KEAP1, Omaveloxolone
  Autophagy_activation: Autophagy_inactive => Autophagy_active; cell*Function_for_Autophagy_activation(Autophagy_inactive, Spermidine, cell, k_spermidine_activation);  // modifiers: Spermidine
  Autophagy_deactivation: Autophagy_active => Autophagy_inactive; cell*Function_for_Autophagy_deactivation(Autophagy_active, cell, k_autophagy_deactivation);
  Autophagy_DNA_repair: DNA_damage => ; cell*Function_for_Autophagy_DNA_repair(Autophagy_active, DNA_damage, Km_autophagy, cell, k_autophagy_repair);  // modifiers: Autophagy_active
  DNA_damage_production: => DNA_damage; cell*Function_for_DNA_damage_production(cell, k_damage_production);
  p21_production: => p21; cell*Function_for_p21_production(cell, k_p21, p53_active);  // modifiers: p53_active
  p21_degradation: p21 => ; cell*Function_for_p21_degradation(cell, k_p21_deg, p21);
  BAX_production: => BAX; cell*Function_for_BAX_production(cell, k_BAX, p53_active);  // modifiers: p53_active
  BAX_degradation: BAX => ; cell*Function_for_BAX_degradation(BAX, cell, k_BAX_deg);
  PUMA_production: => PUMA; cell*Function_for_PUMA_production(cell, k_PUMA, p53_active);  // modifiers: p53_active
  PUMA_degradation: PUMA => ; cell*Function_for_PUMA_degradation(PUMA, cell, k_PUMA_deg);

  // Unit definitions:
  unit length = metre;
  unit area = metre^2;
  unit volume = litre;
  unit time = second;
  unit substance = mole;
end
