// SBML level 2 version 1

model EGFR_FGFR_SIGNALLING()
  // EGFR-FGFR SIGNALLING
  // EGFR, FGFR and TNFR signaling in NSCLC.
  // biomodels.db:MODEL2606190001

  // Compartments:
  compartment Plasma_membrane = 1;
  compartment cytoplasm = 1;
  compartment M_PM = 1;
  compartment M_cytoplasm = 1;
  compartment nucleus in cytoplasm = 1;
  compartment M_nucleus in M_cytoplasm = 1;

  // Species:
  substanceOnly species EGFR in Plasma_membrane = 30000;  // substance in MWBUILTINUNIT_molecule
  substanceOnly species EGF in Plasma_membrane = 30000;  // substance in MWBUILTINUNIT_molecule
  substanceOnly species FGF in Plasma_membrane = 7100;  // substance in MWBUILTINUNIT_molecule
  substanceOnly species FGFR in Plasma_membrane = 7100;  // substance in MWBUILTINUNIT_molecule
  substanceOnly species TNFR in Plasma_membrane = 50000;  // substance in MWBUILTINUNIT_molecule
  substanceOnly species TNF_A_Plasma_membrane in Plasma_membrane = 50000; TNF_A_Plasma_membrane is "TNF-A";  // substance in MWBUILTINUNIT_molecule
  substanceOnly species EGFRc in cytoplasm = 45000;  // substance in MWBUILTINUNIT_molecule
  substanceOnly species FGFRc in cytoplasm = 7200;  // substance in MWBUILTINUNIT_molecule
  substanceOnly species ACTIVATED_JAK1_2 in cytoplasm = 100000; ACTIVATED_JAK1_2 is "ACTIVATED JAK1/2";  // substance in MWBUILTINUNIT_molecule
  substanceOnly species CRK in cytoplasm = 110000;  // substance in MWBUILTINUNIT_molecule
  substanceOnly species PLC_G in cytoplasm = 100000; PLC_G is "PLC-G";  // substance in MWBUILTINUNIT_molecule
  substanceOnly species SRC in cytoplasm = 110000;  // substance in MWBUILTINUNIT_molecule
  substanceOnly species FRS2 in cytoplasm = 14000;  // substance in MWBUILTINUNIT_molecule
  substanceOnly species STAT3_Dimer in cytoplasm = 300000;  // substance in MWBUILTINUNIT_molecule
  substanceOnly species FRS2_GRB2_SOS in cytoplasm = 16000; FRS2_GRB2_SOS is "FRS2/GRB2/SOS";  // substance in MWBUILTINUNIT_molecule
  substanceOnly species GRB2_SOS in cytoplasm = 20000; GRB2_SOS is "GRB2/SOS";  // substance in MWBUILTINUNIT_molecule
  substanceOnly species RAS in cytoplasm = 410000;  // substance in MWBUILTINUNIT_molecule
  substanceOnly species RAF in cytoplasm = 300000;  // substance in MWBUILTINUNIT_molecule
  substanceOnly species RAC in cytoplasm = 300000;  // substance in MWBUILTINUNIT_molecule
  substanceOnly species MEK1_2 in cytoplasm = 380000; MEK1_2 is "MEK1/2";  // substance in MWBUILTINUNIT_molecule
  substanceOnly species ERK1_2_cytoplasm in cytoplasm = 5000000; ERK1_2_cytoplasm is "ERK1/2";  // substance in MWBUILTINUNIT_molecule
  substanceOnly species MKK3_6 in cytoplasm = 530000; MKK3_6 is "MKK3/6";  // substance in MWBUILTINUNIT_molecule
  substanceOnly species JNKdimer in cytoplasm = 530000;  // substance in MWBUILTINUNIT_molecule
  species Activ_SPRY2 in cytoplasm = 1624500/cytoplasm; Activ_SPRY2 is "Activ.SPRY2";
  substanceOnly species FRS2_GRB2 in cytoplasm = 18000; FRS2_GRB2 is "FRS2/GRB2";  // substance in MWBUILTINUNIT_molecule
  substanceOnly species PI3K_cytoplasm in cytoplasm = 160000;  // substance in MWBUILTINUNIT_molecule
  substanceOnly species dock1 in cytoplasm = 98000;  // substance in MWBUILTINUNIT_molecule
  substanceOnly species YAP in cytoplasm = 640000;  // substance in MWBUILTINUNIT_molecule
  substanceOnly species PIP2 in cytoplasm = 90000;  // substance in MWBUILTINUNIT_molecule
  species DAG in cytoplasm = 0;
  substanceOnly species PIP3 in cytoplasm = 200000;  // substance in MWBUILTINUNIT_molecule
  substanceOnly species IP3 in cytoplasm = 42000;  // substance in MWBUILTINUNIT_molecule
  substanceOnly species DaG in cytoplasm = 30000;  // substance in MWBUILTINUNIT_molecule
  substanceOnly species Ca2 in cytoplasm = 70000; Ca2 is "Ca2+";  // substance in MWBUILTINUNIT_molecule
  substanceOnly species DAG_Ca_Complex in cytoplasm = 4000;  // substance in MWBUILTINUNIT_molecule
  substanceOnly species PKC in cytoplasm = 11000;  // substance in MWBUILTINUNIT_molecule
  substanceOnly species PDK1 in cytoplasm = 200000;  // substance in MWBUILTINUNIT_molecule
  substanceOnly species AKT in cytoplasm = 300000;  // substance in MWBUILTINUNIT_molecule
  substanceOnly species mTOR in cytoplasm = 330000;  // substance in MWBUILTINUNIT_molecule
  substanceOnly species HIF_1A_cytoplasm in cytoplasm = 380000; HIF_1A_cytoplasm is "HIF-1A";  // substance in MWBUILTINUNIT_molecule
  substanceOnly species TNFRc in cytoplasm = 45000;  // substance in MWBUILTINUNIT_molecule
  substanceOnly species TRADD in cytoplasm = 45000;  // substance in MWBUILTINUNIT_molecule
  substanceOnly species tnf_tradd in cytoplasm = 47000; tnf_tradd is "tnf-tradd";  // substance in MWBUILTINUNIT_molecule
  substanceOnly species TRAF2 in cytoplasm = 78000;  // substance in MWBUILTINUNIT_molecule
  substanceOnly species TRAF4_6 in cytoplasm = 78000;  // substance in MWBUILTINUNIT_molecule
  substanceOnly species MeKK1_4 in cytoplasm = 130000;  // substance in MWBUILTINUNIT_molecule
  substanceOnly species ASK1_2 in cytoplasm = 130000;  // substance in MWBUILTINUNIT_molecule
  substanceOnly species TAK1 in cytoplasm = 130000;  // substance in MWBUILTINUNIT_molecule
  species species_1_cytoplasm in cytoplasm = 0;
  substanceOnly species MKK4_7 in cytoplasm = 240000;  // substance in MWBUILTINUNIT_molecule
  substanceOnly species P38_cytoplasm in cytoplasm = 310000;  // substance in MWBUILTINUNIT_molecule
  substanceOnly species IL_10_cytoplasm in cytoplasm = 449000;  // substance in MWBUILTINUNIT_molecule
  species species_2 in cytoplasm = 0;
  substanceOnly species Dusp1 in cytoplasm = 3500500;  // substance in MWBUILTINUNIT_molecule
  substanceOnly species Dusp4 in cytoplasm = 7885600;  // substance in MWBUILTINUNIT_molecule
  substanceOnly species IL_10_M_PM in M_PM = 449000; IL_10_M_PM is "IL-10";  // substance in MWBUILTINUNIT_molecule
  substanceOnly species IL10R in M_PM = 449000;  // substance in MWBUILTINUNIT_molecule
  substanceOnly species TLR4 in M_PM = 14000;  // substance in MWBUILTINUNIT_molecule
  substanceOnly species LPS in M_PM = 14000;  // substance in MWBUILTINUNIT_molecule
  substanceOnly species IL10Rc in M_cytoplasm = 441900;  // substance in MWBUILTINUNIT_molecule
  substanceOnly species ERK1_2_M_cytoplasm in M_cytoplasm = 497000; ERK1_2_M_cytoplasm is "ERK1/2";  // substance in MWBUILTINUNIT_molecule
  substanceOnly species P38_M_cytoplasm in M_cytoplasm = 497000;  // substance in MWBUILTINUNIT_molecule
  substanceOnly species JAK2 in M_cytoplasm = 497000;  // substance in MWBUILTINUNIT_molecule
  substanceOnly species JNK in M_cytoplasm = 497000;  // substance in MWBUILTINUNIT_molecule
  substanceOnly species TLRc in M_cytoplasm = 14000;  // substance in MWBUILTINUNIT_molecule
  substanceOnly species MYD88 in M_cytoplasm = 14000;  // substance in MWBUILTINUNIT_molecule
  substanceOnly species MYddC in M_cytoplasm = 18000;  // substance in MWBUILTINUNIT_molecule
  substanceOnly species PI3K_M_cytoplasm in M_cytoplasm = 16500;  // substance in MWBUILTINUNIT_molecule
  substanceOnly species Stat3D in M_cytoplasm = 645000;  // substance in MWBUILTINUNIT_molecule
  substanceOnly species akt_M_cytoplasm in M_cytoplasm = 29400;  // substance in MWBUILTINUNIT_molecule
  substanceOnly species stat3_dimer in nucleus = 390000;  // substance in MWBUILTINUNIT_molecule
  substanceOnly species erk1_2 in nucleus = 500000; erk1_2 is "erk1/2";  // substance in MWBUILTINUNIT_molecule
  substanceOnly species ETS1 in nucleus = 640000;  // substance in MWBUILTINUNIT_molecule
  substanceOnly species AP1 in nucleus = 640000;  // substance in MWBUILTINUNIT_molecule
  substanceOnly species MSK1_2 in nucleus = 640000; MSK1_2 is "MSK1/2";  // substance in MWBUILTINUNIT_molecule
  substanceOnly species NF_KB in nucleus = 640000; NF_KB is "NF-KB";  // substance in MWBUILTINUNIT_molecule
  substanceOnly species STAT3 in nucleus = 640000;  // substance in MWBUILTINUNIT_molecule
  substanceOnly species YY1 in nucleus = 450000;  // substance in MWBUILTINUNIT_molecule
  substanceOnly species AP2 in nucleus = 640000;  // substance in MWBUILTINUNIT_molecule
  substanceOnly species FOXA1 in nucleus = 640000;  // substance in MWBUILTINUNIT_molecule
  species p53 in nucleus = 340000/nucleus;
  species VEGF in nucleus = 340000/nucleus;
  species HIF_1A_nucleus in nucleus = 340000/nucleus; HIF_1A_nucleus is "HIF-1A";
  species species_1_nucleus in nucleus = 0;
  substanceOnly species DUSP1 in nucleus = 4000500;  // substance in MWBUILTINUNIT_molecule
  substanceOnly species DUSP4 in nucleus = 8139500;  // substance in MWBUILTINUNIT_molecule
  substanceOnly species CREB in nucleus = 740000;  // substance in MWBUILTINUNIT_molecule
  substanceOnly species ATF2 in nucleus = 740000;  // substance in MWBUILTINUNIT_molecule
  substanceOnly species yap in nucleus = 540000;  // substance in MWBUILTINUNIT_molecule
  substanceOnly species YAP_YY1 in nucleus = 370000; YAP_YY1 is "YAP/YY1";  // substance in MWBUILTINUNIT_molecule
  substanceOnly species SPRY2 in nucleus = 840000;  // substance in MWBUILTINUNIT_molecule
  substanceOnly species jnkdimer in nucleus = 1000000;  // substance in MWBUILTINUNIT_molecule
  substanceOnly species P38_nucleus in nucleus = 506000;  // substance in MWBUILTINUNIT_molecule
  substanceOnly species SP1 in nucleus = 581000;  // substance in MWBUILTINUNIT_molecule
  substanceOnly species akt_nucleus in nucleus = 130000;  // substance in MWBUILTINUNIT_molecule
  species MYC in nucleus = 190000/nucleus;
  substanceOnly species IL10 in nucleus = 449000;  // substance in MWBUILTINUNIT_molecule
  species egr1 in M_nucleus = 596000/M_nucleus;
  substanceOnly species msk1_2 in M_nucleus = 596000; msk1_2 is "msk1/2";  // substance in MWBUILTINUNIT_molecule
  substanceOnly species nf_kb in M_nucleus = 596000; nf_kb is "nf-kb";  // substance in MWBUILTINUNIT_molecule
  substanceOnly species ap1 in M_nucleus = 596000;  // substance in MWBUILTINUNIT_molecule
  substanceOnly species sp1 in M_nucleus = 596000;  // substance in MWBUILTINUNIT_molecule
  substanceOnly species cMAF in M_nucleus = 596000;  // substance in MWBUILTINUNIT_molecule
  substanceOnly species elk1 in M_nucleus = 596000;  // substance in MWBUILTINUNIT_molecule
  substanceOnly species atf2 in M_nucleus = 596000;  // substance in MWBUILTINUNIT_molecule
  substanceOnly species eRK1_2 in M_nucleus = 496000; eRK1_2 is "eRK1/2";  // substance in MWBUILTINUNIT_molecule
  substanceOnly species p38 in M_nucleus = 495000;  // substance in MWBUILTINUNIT_molecule
  substanceOnly species jnk in M_nucleus = 497000;  // substance in MWBUILTINUNIT_molecule
  substanceOnly species creb in M_nucleus = 1517000;  // substance in MWBUILTINUNIT_molecule
  substanceOnly species atf1 in M_nucleus = 1517000;  // substance in MWBUILTINUNIT_molecule
  species il_10 in M_nucleus = 1780000/M_nucleus; il_10 is "il-10";
  species dusp1 in M_nucleus = 1780000/M_nucleus;
  species IL6 in M_nucleus = 818000/M_nucleus;
  species CCL3 in M_nucleus = 818000/M_nucleus;
  species IL12 in M_nucleus = 897000/M_nucleus;
  species TNF_A_M_nucleus in M_nucleus = 818000/M_nucleus; TNF_A_M_nucleus is "TNF-A";
  substanceOnly species Akt in M_nucleus = 39400;  // substance in MWBUILTINUNIT_molecule
  species NO in M_nucleus = 698000/M_nucleus;
  substanceOnly species StatD in M_nucleus = 645000;  // substance in MWBUILTINUNIT_molecule
  species IL1RA in M_nucleus = 698000/M_nucleus;
  species IL1B1 in M_nucleus = 688000/M_nucleus;

  // Reactions:
  _1: EGFR + EGF => EGFRc; _1_kForward1*EGFR*EGF;
    _1_kForward1 = 3.37e-7 MWDERIVEDUNIT_1__molecule_second;
  _2: FGF + FGFR => FGFRc; _2_kForward1*FGF*FGFR;
    _2_kForward1 = 1.42e-6 MWDERIVEDUNIT_1__molecule_second;
  _3: EGFRc => SRC + PLC_G + CRK + ACTIVATED_JAK1_2; _3_Vm1*EGFRc/(_3_Km1 + EGFRc);
    _3_Vm1 = 400 MWDERIVEDUNIT_molecule__second; _3_Km1 = 200 MWBUILTINUNIT_molecule;
  _4: FGFRc => FRS2 + PLC_G + SRC + CRK + ACTIVATED_JAK1_2; _4_Vm1*FGFRc/(_4_Km1 + FGFRc);
    _4_Vm1 = 200 MWDERIVEDUNIT_molecule__second; _4_Km1 = 100 MWBUILTINUNIT_molecule;
  _5: ACTIVATED_JAK1_2 => STAT3_Dimer; _5_Vm1*ACTIVATED_JAK1_2/(_5_Km1 + ACTIVATED_JAK1_2);
    _5_Vm1 = 1000 MWDERIVEDUNIT_molecule__second; _5_Km1 = 500 MWBUILTINUNIT_molecule;
  _6: STAT3_Dimer => stat3_dimer; _6_kForward1*STAT3_Dimer;
    _6_kForward1 = 0.0099 MWDERIVEDUNIT_1__second;
  _8: FRS2 => FRS2_GRB2_SOS + FRS2_GRB2; _8_kForward1*FRS2;
    _8_kForward1 = 0.0096 MWDERIVEDUNIT_1__second;
  _9: EGFRc => GRB2_SOS; _9_kForward1*EGFRc;
    _9_kForward1 = 0.011 MWDERIVEDUNIT_1__second;
  _10: FRS2_GRB2_SOS => RAS; _10_Vm1*FRS2_GRB2_SOS/(_10_Km1 + FRS2_GRB2_SOS);
    _10_Vm1 = 200 MWDERIVEDUNIT_molecule__second; _10_Km1 = 100 MWBUILTINUNIT_molecule;
  _11: GRB2_SOS => RAS; _11_Vm1*GRB2_SOS/(_11_Km1 + GRB2_SOS);
    _11_Vm1 = 200 MWDERIVEDUNIT_molecule__second; _11_Km1 = 105 MWBUILTINUNIT_molecule;
  _12: SRC => RAS + ERK1_2_cytoplasm + STAT3_Dimer + Activ_SPRY2 + PI3K_cytoplasm; _12_Vm1*SRC/(_12_Km1 + SRC);
    _12_Vm1 = 1100 MWDERIVEDUNIT_molecule__second; _12_Km1 = 450 MWBUILTINUNIT_molecule;
  _13: RAS => RAF + RAC + PI3K_cytoplasm; _13_Vm1*RAS/(_13_Km1 + RAS);
    _13_Vm1 = 4500 MWDERIVEDUNIT_molecule__second; _13_Km1 = 1450 MWBUILTINUNIT_molecule;
  _14: RAF => MEK1_2; _14_Vm1*RAF/(_14_Km1 + RAF);
    _14_Vm1 = 4800 MWDERIVEDUNIT_molecule__second; _14_Km1 = 1500 MWBUILTINUNIT_molecule;
  _15: MEK1_2 => MKK3_6 + JNKdimer + ERK1_2_cytoplasm; _15_Vm1*MEK1_2/(_15_Km1 + MEK1_2);
    _15_Vm1 = 5500 MWDERIVEDUNIT_molecule__second; _15_Km1 = 2500 MWBUILTINUNIT_molecule;
  _16: ERK1_2_cytoplasm => erk1_2; _16_kForward1*ERK1_2_cytoplasm;
    _16_kForward1 = 0.0099 MWDERIVEDUNIT_1__second;
  _17: erk1_2 => ETS1 + AP1 + NF_KB + AP2 + MSK1_2 + YY1 + FOXA1 + STAT3 + HIF_1A_nucleus + SP1; _17_Vm1*erk1_2^_17_n1/(_17_Kp1 + erk1_2^_17_n1);
    _17_Vm1 = 7000 MWDERIVEDUNIT_molecule__second; _17_n1 = 1; _17_Kp1 = 1 MWBUILTINUNIT_molecule;
  _25: FRS2_GRB2 => PI3K_cytoplasm; _25_Vm1*FRS2_GRB2/(_25_Km1 + FRS2_GRB2);
    _25_Vm1 = 100 MWDERIVEDUNIT_molecule__second; _25_Km1 = 50 MWBUILTINUNIT_molecule;
  _18: stat3_dimer => p53 + VEGF + HIF_1A_nucleus + IL10; _18_Vm1*stat3_dimer^_18_n1/(_18_Kp1 + stat3_dimer^_18_n1);
    _18_Vm1 = 4500 MWDERIVEDUNIT_molecule__second; _18_n1 = 1; _18_Kp1 = 1 MWBUILTINUNIT_molecule;
  _19: CRK => dock1; _19_Vm1*CRK/(_19_Km1 + CRK);
    _19_Vm1 = 1000 MWDERIVEDUNIT_molecule__second; _19_Km1 = 350 MWBUILTINUNIT_molecule;
  _20: dock1 => RAC + RAS; _20_Vm1*dock1/(_20_Km1 + dock1);
    _20_Vm1 = 1300 MWDERIVEDUNIT_molecule__second; _20_Km1 = 450 MWBUILTINUNIT_molecule;
  _21: ERK1_2_cytoplasm => YAP; _21_Vm1*ERK1_2_cytoplasm/(_21_Km1 + ERK1_2_cytoplasm);
    _21_Vm1 = 900 MWDERIVEDUNIT_molecule__second; _21_Km1 = 400 MWBUILTINUNIT_molecule;
  _22: PLC_G => PIP2; _22_Vm1*PLC_G/(_22_Km1 + PLC_G);
    _22_Vm1 = 900 MWDERIVEDUNIT_molecule__second; _22_Km1 = 500 MWBUILTINUNIT_molecule;
  _24: PIP2 => PIP3; _24_Vm1*PIP2/(_24_Km1 + PIP2);
    _24_Vm1 = 1200 MWDERIVEDUNIT_molecule__second; _24_Km1 = 450 MWBUILTINUNIT_molecule;
  _26: PIP2 => IP3 + DaG; _26_kForward1*PIP2;
    _26_kForward1 = 4e-5 MWDERIVEDUNIT_1__second;
  _27: IP3 => Ca2; _27_Vm1*IP3/(_27_Km1 + IP3);
    _27_Vm1 = 800 MWDERIVEDUNIT_molecule__second; _27_Km1 = 400 MWBUILTINUNIT_molecule;
  _28: Ca2 + DaG => DAG_Ca_Complex; _28_kForward1*Ca2*DaG;
    _28_kForward1 = 1e-10 MWDERIVEDUNIT_1__molecule_second;
  _29: DAG_Ca_Complex => PKC; _29_Vm1*DAG_Ca_Complex/(_29_Km1 + DAG_Ca_Complex);
    _29_Vm1 = 30 MWDERIVEDUNIT_molecule__second; _29_Km1 = 5 MWBUILTINUNIT_molecule;
  _30: PKC => RAS + RAF; _30_Vm1*PKC/(_30_Km1 + PKC);
    _30_Vm1 = 800 MWDERIVEDUNIT_molecule__second; _30_Km1 = 400 MWBUILTINUNIT_molecule;
  _31: PI3K_cytoplasm => PIP2; _31_Vm1*PI3K_cytoplasm/(_31_Km1 + PI3K_cytoplasm);
    _31_Vm1 = 500 MWDERIVEDUNIT_molecule__second; _31_Km1 = 200 MWBUILTINUNIT_molecule;
  _32: PIP3 => PDK1; _32_Vm1*PIP3/(_32_Km1 + PIP3);
    _32_Vm1 = 2050 MWDERIVEDUNIT_molecule__second; _32_Km1 = 600 MWBUILTINUNIT_molecule;
  _33: PDK1 => AKT; _33_Vm1*PDK1/(_33_Km1 + PDK1);
    _33_Vm1 = 3150 MWDERIVEDUNIT_molecule__second; _33_Km1 = 600 MWBUILTINUNIT_molecule;
  _34: AKT => mTOR; _34_Vm1*AKT/(_34_Km1 + AKT);
    _34_Vm1 = 3500 MWDERIVEDUNIT_molecule__second; _34_Km1 = 600 MWBUILTINUNIT_molecule;
  _35: mTOR => HIF_1A_cytoplasm; _35_Vm1*mTOR/(_35_Km1 + mTOR);
    _35_Vm1 = 4000 MWDERIVEDUNIT_molecule__second; _35_Km1 = 600 MWBUILTINUNIT_molecule;
  _36: HIF_1A_cytoplasm => HIF_1A_nucleus; _36_kForward1*HIF_1A_cytoplasm;
    _36_kForward1 = 0.009 MWDERIVEDUNIT_1__second;
  _37: AP1 => DUSP4 + DUSP1; _37_Vm1*AP1^_37_n1/(_37_Kp1 + AP1^_37_n1);
    _37_Vm1 = 9700 MWDERIVEDUNIT_molecule__second; _37_n1 = 1; _37_Kp1 = 300 MWBUILTINUNIT_molecule;
  _38: NF_KB => DUSP1 + DUSP4; _38_Vm1*NF_KB^_38_n1/(_38_Kp1 + NF_KB^_38_n1);
    _38_Vm1 = 7000 MWDERIVEDUNIT_molecule__second; _38_n1 = 1; _38_Kp1 = 1 MWBUILTINUNIT_molecule;
  _39: MSK1_2 => ATF2 + CREB; _39_Vm1*MSK1_2^_39_n1/(_39_Kp1 + MSK1_2^_39_n1);
    _39_Vm1 = 7500 MWDERIVEDUNIT_molecule__second; _39_n1 = 1; _39_Kp1 = 1 MWBUILTINUNIT_molecule;
  _40: ATF2 => DUSP4 + DUSP1; _40_Vm1*ATF2^_40_n1/(_40_Kp1 + ATF2^_40_n1);
    _40_Vm1 = 9500 MWDERIVEDUNIT_molecule__second; _40_n1 = 1; _40_Kp1 = 1 MWBUILTINUNIT_molecule;
  _41: CREB => DUSP1 + DUSP4 + SPRY2; _41_Vm1*CREB^_41_n1/(_41_Kp1 + CREB^_41_n1);
    _41_Vm1 = 9500 MWDERIVEDUNIT_molecule__second; _41_n1 = 1; _41_Kp1 = 1 MWBUILTINUNIT_molecule;
  _42: YY1 => DUSP1; _42_Vm1*YY1^_42_n1/(_42_Kp1 + YY1^_42_n1);
    _42_Vm1 = 800 MWDERIVEDUNIT_molecule__second; _42_n1 = 1; _42_Kp1 = 1 MWBUILTINUNIT_molecule;
  _43: YAP => yap; _43_kForward1*YAP;
    _43_kForward1 = 1e-6 MWDERIVEDUNIT_1__second;
  _45: yap => DUSP1; _45_Vm1*yap^_45_n1/(_45_Kp1 + yap^_45_n1);
    _45_Vm1 = 100 MWDERIVEDUNIT_molecule__second; _45_n1 = 1; _45_Kp1 = 1 MWBUILTINUNIT_molecule;
  _48: ETS1 => DUSP4 + SPRY2; _48_Vm1*ETS1^_48_n1/(_48_Kp1 + ETS1^_48_n1);
    _48_Vm1 = 9900 MWDERIVEDUNIT_molecule__second; _48_n1 = 1; _48_Kp1 = 1 MWBUILTINUNIT_molecule;
  _49: AP2 => DUSP4; _49_Vm1*AP2^_49_n1/(_49_Kp1 + AP2^_49_n1);
    _49_Vm1 = 9700 MWDERIVEDUNIT_molecule__second; _49_n1 = 1; _49_Kp1 = 1 MWBUILTINUNIT_molecule;
  _50: FOXA1 => DUSP4; _50_Vm1*FOXA1^_50_n1/(_50_Kp1 + FOXA1^_50_n1);
    _50_Vm1 = 9700 MWDERIVEDUNIT_molecule__second; _50_n1 = 1; _50_Kp1 = 1 MWBUILTINUNIT_molecule;
  _51: STAT3 => DUSP4; _51_Vm1*STAT3^_51_n1/(_51_Kp1 + STAT3^_51_n1);
    _51_Vm1 = 9700 MWDERIVEDUNIT_molecule__second; _51_n1 = 1; _51_Kp1 = 1 MWBUILTINUNIT_molecule;
  _52: TNF_A_Plasma_membrane + TNFR => TNFRc; _52_kForward1*TNF_A_Plasma_membrane*TNFR;
    _52_kForward1 = 2e-7 MWDERIVEDUNIT_1__molecule_second;
  _53: TNFRc + TRADD => tnf_tradd; _53_kForward1*TNFRc*TRADD;
    _53_kForward1 = 4e-8 MWDERIVEDUNIT_1__molecule_second;
  _54: tnf_tradd => TRAF2 + TRAF4_6; _54_Vm1*tnf_tradd/(_54_Km1 + tnf_tradd);
    _54_Vm1 = 300 MWDERIVEDUNIT_molecule__second; _54_Km1 = 150 MWBUILTINUNIT_molecule;
  _55: TRAF2 => MeKK1_4 + ASK1_2 + TAK1; _55_Vm1*TRAF2/(_55_Km1 + TRAF2);
    _55_Vm1 = 1500 MWDERIVEDUNIT_molecule__second; _55_Km1 = 750 MWBUILTINUNIT_molecule;
  _56: TRAF4_6 => MeKK1_4 + ASK1_2 + TAK1; _56_Vm1*TRAF4_6/(_56_Km1 + TRAF4_6);
    _56_Vm1 = 1510 MWDERIVEDUNIT_molecule__second; _56_Km1 = 750 MWBUILTINUNIT_molecule;
  _57: MeKK1_4 => MKK4_7; _57_Vm1*MeKK1_4/(_57_Km1 + MeKK1_4);
    _57_Vm1 = 2500 MWDERIVEDUNIT_molecule__second; _57_Km1 = 1000 MWBUILTINUNIT_molecule;
  _58: TAK1 => MKK4_7 + MKK3_6; _58_Vm1*TAK1/(_58_Km1 + TAK1);
    _58_Vm1 = 2100 MWDERIVEDUNIT_molecule__second; _58_Km1 = 1000 MWBUILTINUNIT_molecule;
  _59: ASK1_2 => MKK3_6; _59_Vm1*ASK1_2/(_59_Km1 + ASK1_2);
    _59_Vm1 = 2100 MWDERIVEDUNIT_molecule__second; _59_Km1 = 1000 MWBUILTINUNIT_molecule;
  _60: MKK4_7 => JNKdimer; _60_Vm1*MKK4_7/(_60_Km1 + MKK4_7);
    _60_Vm1 = 2700 MWDERIVEDUNIT_molecule__second; _60_Km1 = 1000 MWBUILTINUNIT_molecule;
  _61: RAC => JNKdimer + P38_cytoplasm; _61_Vm1*RAC/(_61_Km1 + RAC);
    _61_Vm1 = 7000 MWDERIVEDUNIT_molecule__second; _61_Km1 = 1300 MWBUILTINUNIT_molecule;
  _62: MKK3_6 => JNKdimer + P38_cytoplasm; _62_Vm1*MKK3_6/(_62_Km1 + MKK3_6);
    _62_Vm1 = 8000 MWDERIVEDUNIT_molecule__second; _62_Km1 = 2000 MWBUILTINUNIT_molecule;
  _63: JNKdimer => jnkdimer; _63_kForward1*JNKdimer;
    _63_kForward1 = 0.013 MWDERIVEDUNIT_1__second;
  _64: P38_cytoplasm => P38_nucleus; _64_kForward1*P38_cytoplasm;
    _64_kForward1 = 0.026 MWDERIVEDUNIT_1__second;
  _65: AKT => akt_nucleus; _65_kForward1*AKT;
    _65_kForward1 = 0.0069 MWDERIVEDUNIT_1__second;
  _66: akt_nucleus => NF_KB; _66_Vm1*akt_nucleus^_66_n1/(_66_Kp1 + akt_nucleus^_66_n1);
    _66_Vm1 = 1160 MWDERIVEDUNIT_molecule__second; _66_n1 = 1; _66_Kp1 = 50 MWBUILTINUNIT_molecule;
  _68: P38_nucleus => MYC; _68_Vm1*P38_nucleus^_68_n1/(_68_Kp1 + P38_nucleus^_68_n1);
    _68_Vm1 = 2000 MWDERIVEDUNIT_molecule__second; _68_n1 = 1; _68_Kp1 = 1 MWBUILTINUNIT_molecule;
  _69: P38_nucleus => MSK1_2; _69_Vm1*P38_nucleus^_69_n1/(_69_Kp1 + P38_nucleus^_69_n1);
    _69_Vm1 = 2000 MWDERIVEDUNIT_molecule__second; _69_n1 = 1; _69_Kp1 = 1 MWBUILTINUNIT_molecule;
  _70: P38_nucleus => NF_KB; _70_Vm1*P38_nucleus^_70_n1/(_70_Kp1 + P38_nucleus^_70_n1);
    _70_Vm1 = 2000 MWDERIVEDUNIT_molecule__second; _70_n1 = 1; _70_Kp1 = 1 MWBUILTINUNIT_molecule;
  _71: P38_nucleus => ETS1; _71_Vm1*P38_nucleus^_71_n1/(_71_Kp1 + P38_nucleus^_71_n1);
    _71_Vm1 = 2000 MWDERIVEDUNIT_molecule__second; _71_n1 = 1; _71_Kp1 = 1 MWBUILTINUNIT_molecule;
  _72: P38_nucleus => p53; _72_Vm1*P38_nucleus^_72_n1/(_72_Kp1 + P38_nucleus^_72_n1);
    _72_Vm1 = 2000 MWDERIVEDUNIT_molecule__second; _72_Kp1 = 1 MWBUILTINUNIT_molecule; _72_n1 = 1;
  _73: jnkdimer => AP1; _73_Vm1*jnkdimer^_73_n1/(_73_Kp1 + jnkdimer^_73_n1);
    _73_Vm1 = 3000 MWDERIVEDUNIT_molecule__second; _73_n1 = 1; _73_Kp1 = 1 MWBUILTINUNIT_molecule;
  _74: jnkdimer => MSK1_2; _74_Vm1*jnkdimer^_74_n1/(_74_Kp1 + jnkdimer^_74_n1);
    _74_Vm1 = 3000 MWDERIVEDUNIT_molecule__second; _74_n1 = 1; _74_Kp1 = 1 MWBUILTINUNIT_molecule;
  _75: jnkdimer => p53; _75_Vm1*jnkdimer^_75_n1/(_75_Kp1 + jnkdimer^_75_n1);
    _75_Vm1 = 3000 MWDERIVEDUNIT_molecule__second; _75_n1 = 1; _75_Kp1 = 1 MWBUILTINUNIT_molecule;
  _78: IL10 => IL_10_cytoplasm; _78_kForward1*IL10;
    _78_kForward1 = 0.01 MWDERIVEDUNIT_1__second;
  _79: IL_10_cytoplasm => IL_10_M_PM; _79_kForward1*IL_10_cytoplasm;
    _79_kForward1 = 0.01 MWDERIVEDUNIT_1__second;
  _80: IL_10_M_PM + IL10R => IL10Rc; _80_kForward1*IL_10_M_PM*IL10R;
    _80_kForward1 = 2.2e-8 MWDERIVEDUNIT_1__molecule_second;
  _81: IL10Rc => ERK1_2_M_cytoplasm + JAK2 + P38_M_cytoplasm + JNK; _81_Vm1*IL10Rc/(_81_Km1 + IL10Rc);
    _81_Vm1 = 5000 MWDERIVEDUNIT_molecule__second; _81_Km1 = 2000 MWBUILTINUNIT_molecule;
  _82: TLR4 + LPS => TLRc; _82_kForward1*TLR4*LPS;
    _82_kForward1 = 7.2e-7 MWDERIVEDUNIT_1__molecule_second;
  _83: TLRc + MYD88 => MYddC; _83_kForward1*TLRc*MYD88;
    _83_kForward1 = 5e-7 MWDERIVEDUNIT_1__molecule_second;
  _84: MYddC => ERK1_2_M_cytoplasm + P38_M_cytoplasm + JNK + PI3K_M_cytoplasm; _84_Vm1*MYddC/(_84_Km1 + MYddC);
    _84_Vm1 = 170 MWDERIVEDUNIT_molecule__second; _84_Km1 = 75 MWBUILTINUNIT_molecule;
  _85: JAK2 => Stat3D; _85_Vm1*JAK2/(_85_Km1 + JAK2);
    _85_Vm1 = 6500 MWDERIVEDUNIT_molecule__second; _85_Km1 = 3000 MWBUILTINUNIT_molecule;
  _86: ERK1_2_M_cytoplasm => eRK1_2; _86_kForward1*ERK1_2_M_cytoplasm;
    _86_kForward1 = 0.01 MWDERIVEDUNIT_1__second;
  _87: eRK1_2 => egr1 + sp1 + cMAF + elk1 + msk1_2 + nf_kb + atf2 + ap1; _87_Vm1*eRK1_2^_87_n1/(_87_Kp1 + eRK1_2^_87_n1);
    _87_Vm1 = 6000 MWDERIVEDUNIT_molecule__second; _87_Kp1 = 2500 MWBUILTINUNIT_molecule; _87_n1 = 1;
  _88: P38_M_cytoplasm => p38; _88_kForward1*P38_M_cytoplasm;
    _88_kForward1 = 0.01 MWDERIVEDUNIT_1__second;
  _89: p38 => elk1 + cMAF + atf2 + nf_kb + sp1 + ap1 + msk1_2 + egr1; _89_Vm1*p38^_89_n1/(_89_Kp1 + p38^_89_n1);
    _89_Vm1 = 5500 MWDERIVEDUNIT_molecule__second; _89_n1 = 1; _89_Kp1 = 2500 MWBUILTINUNIT_molecule;
  _90: JNK => jnk; _90_kForward1*JNK;
    _90_kForward1 = 0.01 MWDERIVEDUNIT_1__second;
  _91: jnk => elk1 + cMAF + atf2 + nf_kb + sp1 + ap1 + msk1_2 + egr1; _91_Vm1*jnk^_91_n1/(_91_Kp1 + jnk^_91_n1);
    _91_Vm1 = 5300 MWDERIVEDUNIT_molecule__second; _91_n1 = 1; _91_Kp1 = 1 MWBUILTINUNIT_molecule;
  _92: msk1_2 => creb + atf1; _92_Vm1*msk1_2^_92_n1/(_92_Kp1 + msk1_2^_92_n1);
    _92_Vm1 = 7500 MWDERIVEDUNIT_molecule__second; _92_n1 = 1; _92_Kp1 = 1 MWBUILTINUNIT_molecule;
  _93: atf1 => il_10 + dusp1; _93_Vm1*atf1^_93_n1/(_93_Kp1 + atf1^_93_n1);
    _93_Vm1 = 9700 MWDERIVEDUNIT_molecule__second; _93_n1 = 1; _93_Kp1 = 1 MWBUILTINUNIT_molecule;
  _94: creb => dusp1 + il_10 + IL6 + CCL3; _94_Vm1*creb^_94_n1/(_94_Kp1 + creb^_94_n1);
    _94_Vm1 = 8200 MWDERIVEDUNIT_molecule__second; _94_n1 = 1; _94_Kp1 = 1 MWBUILTINUNIT_molecule;
  _95: ap1 => il_10 + CCL3 + IL6 + IL12 + TNF_A_M_nucleus; _95_Vm1*ap1^_95_n1/(_95_Kp1 + ap1^_95_n1);
    _95_Vm1 = 9000 MWDERIVEDUNIT_molecule__second; _95_n1 = 1; _95_Kp1 = 1 MWBUILTINUNIT_molecule;
  _96: PI3K_M_cytoplasm => akt_M_cytoplasm; _96_Vm1*PI3K_M_cytoplasm/(_96_Km1 + PI3K_M_cytoplasm);
    _96_Vm1 = 300 MWDERIVEDUNIT_molecule__second; _96_Km1 = 150 MWBUILTINUNIT_molecule;
  _97: akt_M_cytoplasm => Akt; _97_kForward1*akt_M_cytoplasm;
    _97_kForward1 = 0.01 MWDERIVEDUNIT_1__second;
  _98: Akt => nf_kb; _98_Vm1*Akt^_98_n1/(_98_Kp1 + Akt^_98_n1);
    _98_Vm1 = 500 MWDERIVEDUNIT_molecule__second; _98_n1 = 1; _98_Kp1 = 1 MWBUILTINUNIT_molecule;
  _99: nf_kb => dusp1 + TNF_A_M_nucleus + IL6 + il_10 + CCL3; _99_Vm1*nf_kb^_99_n1/(_99_Kp1 + nf_kb^_99_n1);
    _99_Vm1 = 7000 MWDERIVEDUNIT_molecule__second; _99_n1 = 1; _99_Kp1 = 1 MWBUILTINUNIT_molecule;
  _100: atf2 => IL6 + TNF_A_M_nucleus + IL12 + NO; _100_Vm1*atf2^_100_n1/(_100_Kp1 + atf2^_100_n1);
    _100_Vm1 = 7000 MWDERIVEDUNIT_molecule__second; _100_n1 = 1; _100_Kp1 = 1 MWBUILTINUNIT_molecule;
  _101: Stat3D => StatD; _101_kForward1*Stat3D;
    _101_kForward1 = 0.01 MWDERIVEDUNIT_1__second;
  _102: elk1 => IL6 + TNF_A_M_nucleus + IL12; _102_Vm1*elk1^_102_n1/(_102_Kp1 + elk1^_102_n1);
    _102_Vm1 = 6000 MWDERIVEDUNIT_molecule__second; _102_n1 = 1; _102_Kp1 = 1 MWBUILTINUNIT_molecule;
  _103: cMAF => il_10 + IL1RA; _103_Vm1*cMAF^_103_n1/(_103_Kp1 + cMAF^_103_n1);
    _103_Vm1 = 7000 MWDERIVEDUNIT_molecule__second; _103_n1 = 1; _103_Kp1 = 1 MWBUILTINUNIT_molecule;
  _104: sp1 => IL1RA + il_10; _104_Vm1*sp1^_104_n1/(_104_Kp1 + sp1^_104_n1);
    _104_Vm1 = 7000 MWDERIVEDUNIT_molecule__second; _104_n1 = 1; _104_Kp1 = 1 MWBUILTINUNIT_molecule;
  _105: StatD => il_10 + TNF_A_M_nucleus + IL6 + IL1B1; _105_Vm1*StatD^_105_n1/(_105_Kp1 + StatD^_105_n1);
    _105_Vm1 = 7000 MWDERIVEDUNIT_molecule__second; _105_n1 = 1; _105_Kp1 = 1 MWBUILTINUNIT_molecule;
  _106: SPRY2 => Activ_SPRY2; _106_kForward1*SPRY2;
    _106_kForward1 = 0.012 MWDERIVEDUNIT_1__second;
  _107: DUSP4 => Dusp4; _107_kForward1*DUSP4;
    _107_kForward1 = 0.01 MWDERIVEDUNIT_1__second;
  _108: DUSP1 => Dusp1; _108_kForward1*DUSP1;
    _108_kForward1 = 0.0099 MWDERIVEDUNIT_1__second;
  _109: SP1 => DUSP4 + DUSP1; _109_Vm1*SP1^_109_n1/(_109_Kp1 + SP1^_109_n1);
    _109_Vm1 = 8500 MWDERIVEDUNIT_molecule__second; _109_n1 = 1; _109_Kp1 = 1 MWBUILTINUNIT_molecule;

  // Unit definitions:
  unit MWBUILTINUNIT_molecule = 1.660539e-24 mole;
  unit MWDERIVEDUNIT_1__molecule_second = 6.022142e23 dimensionless / (mole * second); MWDERIVEDUNIT_1__molecule_second is "1/(molecule*second)";
  unit MWDERIVEDUNIT_molecule__second = mole * 1.660539e-24 dimensionless / second; MWDERIVEDUNIT_molecule__second is "molecule/second";
  unit MWDERIVEDUNIT_1__second = dimensionless / second; MWDERIVEDUNIT_1__second is "1/second";
end
